# OpenSim document version 30000
ForceSet loadedwalking_subject10_loaded_residual_actuators:
  defaults:
    PointActuator default: point=(0 0 0) point_is_global=false direction=(-1 0 0) force_is_global=true
        optimal_force=1000
    TorqueActuator default: torque_is_global=true axis=(-1 0 0) optimal_force=300
  PointActuator FX: body=pelvis point=(-0.09171692 0.0645571 -1.789008e-5) point_is_global=false direction=(1 0 0)
      force_is_global=true optimal_force=1.5
  PointActuator FY: body=pelvis point=(-0.09171692 0.0645571 -1.789008e-5) point_is_global=false direction=(0 1 0)
      force_is_global=true optimal_force=1.5
  PointActuator FZ: body=pelvis point=(-0.09171692 0.0645571 -1.789008e-5) point_is_global=false direction=(0 0 1)
      force_is_global=true optimal_force=1.5
  TorqueActuator MX: bodyA=pelvis bodyB=ground torque_is_global=true axis=(1 0 0) optimal_force=1
  TorqueActuator MY: bodyA=pelvis bodyB=ground torque_is_global=true axis=(0 1 0) optimal_force=1
  TorqueActuator MZ: bodyA=pelvis bodyB=ground torque_is_global=true axis=(0 0 1) optimal_force=1
