# OpenSim document version 30000
ForwardTool default:
  model_file: subject10_adjusted_loaded_markered_adjusted.osim
  replace_force_set: false
  force_set_files: cmc_actuators_LowerBody.xml loaded_residual_actuators.xml device.xml
  results_directory: ./
  output_precision: 8
  initial_time: 0
  final_time: 5
  solve_for_equilibrium_for_auxiliary_states: false
  maximum_number_of_integrator_steps: 20000
  maximum_integrator_step_size: 1
  minimum_integrator_step_size: 1e-8
  integrator_error_tolerance: 1e-6
  external_loads_file: external_loads.xml
  states_file: results/loadedwalking_subject10_loaded_free_trial03_cmc_states.sto
  use_specified_dt: false
  ControllerSet Controllers:
    ControlSetController controlset: controls_file=results/loadedwalking_subject10_loaded_free_trial03_cmc_controls.xml
