# OpenSim document version 30000
Model loadedwalking_subject10_adjusted_loaded_markered_adjusted:
  length_units: meters
  force_units: N
  gravity: 0 -9.80665 0
  credits:
    Arnold, E.M., Hamner, S.R., Ward, S.R., Lieber, R. L., and Delp, S.L.
  defaults:
    CoordinateActuator default: optimal_force=300
    Millard2012EquilibriumMuscle default: min_control=0.01 max_control=1 optimal_force=1 max_isometric_force=546
        optimal_fiber_length=0.0535 tendon_slack_length=0.078 pennation_angle_at_optimal=0 [radians]
        max_contraction_velocity=10
  BodySet:
    Body ground: mass=0 mass_center=(0 0 0) inertia_xx=0 inertia_yy=0 inertia_zz=0
    Body pelvis: mass=10.01027 mass_center=(-0.0747361 0 0) inertia_xx=0.08453054 inertia_yy=0.08453054
        inertia_zz=0.04351834 meshes=(r_pelvis.vtp l_pelvis.vtp sacrum.vtp)
      CustomJoint ground_pelvis: parent_body=ground location_in_parent=(0 0 0) location=(0 0 0)
        Coordinate pelvis_tilt: motion_type=rotational default_value=0 range=(-1.570796 1.570796) clamped=true
        Coordinate pelvis_list: motion_type=rotational default_value=0 range=(-1.570796 1.570796) clamped=true
        Coordinate pelvis_rotation: motion_type=rotational default_value=0 range=(-1.570796 1.570796) clamped=true
        Coordinate pelvis_tx: motion_type=translational default_value=0 range=(-5 5) clamped=true
        Coordinate pelvis_ty: motion_type=translational default_value=0.93 range=(-1 2) clamped=true
        Coordinate pelvis_tz: motion_type=translational default_value=0 range=(-3 3) clamped=true
        SpatialTransform:
          TransformAxis rotation1: coordinates=pelvis_tilt axis=(0 0 1) LinearFunction(coefficients=1 0)
          TransformAxis rotation2: coordinates=pelvis_list axis=(1 0 0) LinearFunction(coefficients=1 0)
          TransformAxis rotation3: coordinates=pelvis_rotation axis=(0 1 0) LinearFunction(coefficients=1 0)
          TransformAxis translation1: coordinates=pelvis_tx axis=(1 0 0) LinearFunction(coefficients=1 0)
          TransformAxis translation2: coordinates=pelvis_ty axis=(0 1 0) LinearFunction(coefficients=1 0)
          TransformAxis translation3: coordinates=pelvis_tz axis=(0 0 1) LinearFunction(coefficients=1 0)
      WrapCylinder Gmax1_at_pelvis_r: xyz_body_rotation=(-0.6 0.45 0) translation=(-0.0813957 -0.0828146 0.061)
          quadrant=-x radius=0.03859463 length=0.145786
      WrapCylinder Gmax2_at_pelvis_r: xyz_body_rotation=(-0.75 0.39 0) translation=(-0.084567 -0.0694304 0.068)
          quadrant=all radius=0.03910963 length=0.09474353
      WrapCylinder Gmax3_at_pelvis_r: xyz_body_rotation=(-0.1 0 0) translation=(-0.0877382 -0.073613 0.068)
          quadrant=all radius=0.03790771 length=0.09985026
      WrapCylinder Gmax1_at_pelvis_l: xyz_body_rotation=(0.6 -0.45 0) translation=(-0.0813957 -0.0828146 -0.061)
          quadrant=-x radius=0.03859463 length=0.145786
      WrapCylinder Gmax2_at_pelvis_l: xyz_body_rotation=(0.75 -0.39 0) translation=(-0.084567 -0.0694304 -0.068)
          quadrant=all radius=0.03910963 length=0.09474353
      WrapCylinder Gmax3_at_pelvis_l: xyz_body_rotation=(0.1 0 0) translation=(-0.0877382 -0.073613 -0.068)
          quadrant=all radius=0.03790771 length=0.09985026
      WrapCylinder PS_at_brim_r: xyz_body_rotation=(-0.25 -0.27 0.1) translation=(-0.0782245 -0.0501907 0.0656)
          quadrant=-y radius=0.04751996 length=0.09956327
      WrapCylinder PS_at_brim_l: xyz_body_rotation=(0.25 0.27 0.1) translation=(-0.0782245 -0.0501907 -0.0656)
          quadrant=-y radius=0.04751996 length=0.09956327
      WrapCylinder IL_at_brim_r: xyz_body_rotation=(-0.32 -0.24 0.9) translation=(-0.0750532 -0.0543732 0.0756)
          quadrant=-y radius=0.0526061 length=0.0989244
      WrapCylinder IL_at_brim_l: xyz_body_rotation=(0.32 0.24 0.9) translation=(-0.0750532 -0.0543732 -0.0756)
          quadrant=-y radius=0.0526061 length=0.0989244
    Body femur_r: mass=7.906048 mass_center=(0 -0.186335 0) inertia_xx=0.1367362 inertia_yy=0.03584347
        inertia_zz=0.1441908 meshes=r_femur.vtp
      CustomJoint hip_r: parent_body=pelvis location_in_parent=(-0.05948864 -0.06565777 0.07726) location=(0 0 0)
        Coordinate hip_flexion_r: motion_type=rotational default_value=0 range=(-0.5235988 2.094395) clamped=true
        Coordinate hip_adduction_r: motion_type=rotational default_value=0 range=(-0.8726646 0.5235988) clamped=true
        Coordinate hip_rotation_r: motion_type=rotational default_value=0 range=(-0.6981317 0.6981317) clamped=true
        SpatialTransform: axes_held_at_zero=(translation1 translation2 translation3)
          TransformAxis rotation1: coordinates=hip_flexion_r axis=(0 0 1) LinearFunction(coefficients=1 0)
          TransformAxis rotation2: coordinates=hip_adduction_r axis=(1 0 0) LinearFunction(coefficients=1 0)
          TransformAxis rotation3: coordinates=hip_rotation_r axis=(0 1 0) LinearFunction(coefficients=1 0)
      WrapCylinder Gastroc_at_condyles_r: translation=(0.00548045 -0.449397 0) quadrant=all radius=0.02740223
          length=0.1096089
      WrapCylinder KnExt_at_fem_r: xyz_body_rotation=(-0.0623366 0.0507601 0)
          translation=(0.00393307 -0.44143 0.00229204) quadrant=all radius=0.02740223 length=0.1096089
      WrapCylinder AB_at_femshaft_r: xyz_body_rotation=(1.66157 0.186644 0) translation=(0.0160505 -0.123414 0.0256101)
          quadrant=all radius=0.01808547 length=0.07672624
      WrapCylinder AL_at_femshaft_r: xyz_body_rotation=(1.77711 0.136489 0) translation=(0.0336858 -0.254193 0.016566)
          quadrant=all radius=0.02203139 length=0.1096089
      WrapCylinder AMprox_at_femshaft_r: xyz_body_rotation=(1.61126 0.18656 0)
          translation=(0.00568102 -0.0798992 0.027844) quadrant=all radius=0.02312748 length=0.07672624
      WrapCylinder AMmid_at_femshaft_r: xyz_body_rotation=(1.61139 0.13656 0)
          translation=(0.0252238 -0.176154 0.0225621) quadrant=all radius=0.02345631 length=0.1315307
      WrapCylinder AMdist_at_femshaft_r: xyz_body_rotation=(1.71188 0.186636 0)
          translation=(0.0346435 -0.28579 0.0102644) quadrant=all radius=0.02389474 length=0.2192178
      WrapCylinder AMisch_at_condyles_r: xyz_body_rotation=(1.71115 -0.463363 0)
          translation=(-0.0248276 -0.41304 -0.00345747) quadrant=all radius=0.04384357 length=0.2630614
      WrapCylinder PECT_at_femshaft_r: xyz_body_rotation=(1.81295 0.276344 0)
          translation=(0.0066705 -0.0926227 0.0333655) quadrant=all radius=0.01644134 length=0.05480446
    Body tibia_r: mass=3.151318 mass_center=(0 -0.210471 0) inertia_xx=0.05444248 inertia_yy=0.00550906
        inertia_zz=0.05519862 meshes=(r_tibia.vtp r_fibula.vtp)
      CustomJoint walker_knee_r: parent_body=femur_r location_in_parent=(-0.008867361 -0.4471605 -0.003014245)
          orientation_in_parent=(-1.641568 1.446181 1.570796) location=(-0.009119519 -0.003984859 -0.001673781)
          orientation=(-1.641568 1.446181 1.570796)
        Coordinate knee_angle_r: motion_type=rotational default_value=0 range=(0 2.0944) clamped=false
        SpatialTransform: axes_held_at_zero=translation3
          TransformAxis rotation1: coordinates=knee_angle_r axis=(1 0 0) LinearFunction(coefficients=1 0)
          TransformAxis rotation2: coordinates=knee_angle_r axis=(0 0 1)
            SimmSpline: x=(0 0.174533 0.349066 0.523599 0.698132 0.872665 1.0472 1.22173 1.39626 1.5708 1.74533 1.91986 2.0944)
                y=(0 0.0126809 0.0226969 0.0296054 0.0332049 0.0335354 0.0308779 0.0257548 0.0189295 0.011407 0.00443314 -0.00050475 -0.0016782)
          TransformAxis rotation3: coordinates=knee_angle_r axis=(0 1 0)
            SimmSpline: x=(0 0.174533 0.349066 0.523599 0.698132 0.872665 1.0472 1.22173 1.39626 1.5708 1.74533 1.91986 2.0944)
                y=(0 0.059461 0.109399 0.150618 0.18392 0.210107 0.229983 0.24435 0.254012 0.25977 0.262428 0.262788 0.261654)
          TransformAxis translation1: coordinates=knee_angle_r axis=(0 1 0)
            MultiplierFunction: scale=1.096089
              SimmSpline: x=(0 0.174533 0.349066 0.523599 0.698132 0.872665 1.0472 1.22173 1.39626 1.5708 1.74533 1.91986 2.0944)
                  y=(0 0.000479 0.000835 0.001086 0.001251 0.001346 0.001391 0.001403 0.0014 0.0014 0.001421 0.001481 0.001599)
          TransformAxis translation2: coordinates=knee_angle_r axis=(0 0 1)
            MultiplierFunction: scale=1.096089
              SimmSpline: x=(0 0.174533 0.349066 0.523599 0.698132 0.872665 1.0472 1.22173 1.39626 1.5708 1.74533 1.91986 2.0944)
                  y=(0 0.000988 0.001899 0.002734 0.003492 0.004173 0.004777 0.005305 0.005756 0.00613 0.006427 0.006648 0.006792)
      WrapCylinder GasLat_at_shank_r: xyz_body_rotation=(2.96723 -0.279725 -1.47812)
          translation=(-0.00834219 -0.0834219 -0.00372016) quadrant=-y radius=0.06200273 length=0.1127322
      WrapCylinder GasMed_at_shank_r: xyz_body_rotation=(2.96723 0.0279725 -1.47812)
          translation=(-0.00834219 -0.0834219 -0.00372016) quadrant=-y radius=0.06200273 length=0.1127322
      WrapCylinder GR_at_condyles_r: xyz_body_rotation=(0 -0.4 0) translation=(-0.00338197 -0.0225464 0) quadrant=all
          radius=0.0405836 length=0.1127322
      WrapCylinder SM_at_condyles_r: xyz_body_rotation=(0 -0.1 0) translation=(-0.00112732 -0.0225464 0) quadrant=all
          radius=0.03968175 length=0.1127322
      WrapCylinder ST_at_condyles_r: xyz_body_rotation=(0 -0.2 0) translation=(-0.00225464 -0.0231101 0) quadrant=all
          radius=0.0479112 length=0.1127322
      WrapCylinder BF_at_gastroc_r: translation=(-0.0653847 -0.0676393 0) quadrant=y radius=0.03381967 length=0.1690983
    Body patella_r: mass=0.07326868 mass_center=(0.00197296 0.0289368 0) inertia_xx=2.93079e-6 inertia_yy=1.338769e-5
        inertia_zz=1.338769e-5 meshes=r_patella.vtp
      CustomJoint patellofemoral_r: parent_body=femur_r location_in_parent=(-0.008867361 -0.4471605 -0.003014245)
          location=(0 0 0)
        Coordinate knee_angle_r_beta: motion_type=rotational default_value=0 range=(-99999.9 99999.9) clamped=false
        SpatialTransform: axes_held_at_zero=(rotation2 rotation3)
          TransformAxis rotation1: coordinates=knee_angle_r_beta axis=(0 0 1)
            SimmSpline f11: x=(0 0.174533 0.349066 0.523599 0.698132 0.872665 1.0472 1.22173 1.39626 1.5708 1.74533 1.91986 2.0944)
                y=(0.00113686 -0.00629212 -0.105582 -0.253683 -0.414245 -0.579047 -0.747244 -0.91799 -1.09044 -1.26379 -1.43763 -1.61186 -1.78634)
          TransformAxis translation1: coordinates=knee_angle_r_beta axis=(1 0 0)
            MultiplierFunction: scale=1.096089
              SimmSpline f9: x=(0 0.174533 0.349066 0.523599 0.698132 0.872665 1.0472 1.22173 1.39626 1.5708 1.74533 1.91986 2.0944)
                  y=(0.0524 0.0488 0.0437 0.0371 0.0296 0.0216 0.0136 0.0057 -0.0019 -0.0088 -0.0148 -0.0196 -0.0227)
          TransformAxis translation2: coordinates=knee_angle_r_beta axis=(0 1 0)
            MultiplierFunction: scale=1.096089
              SimmSpline f10: x=(0 0.174533 0.349066 0.523599 0.698132 0.872665 1.0472 1.22173 1.39626 1.5708 1.74533 1.91986 2.0944)
                  y=(-0.0108 -0.019 -0.0263 -0.0322 -0.0367 -0.0395 -0.0408 -0.0404 -0.0384 -0.0349 -0.0301 -0.0245 -0.0187)
          TransformAxis translation3: axis=(0 0 1) MultiplierFunction(scale=1.096089, Constant(value=0.00275))
    Body talus_r: mass=0.08499847 mass_center=(0 0 0) inertia_xx=0.001307159 inertia_yy=0.001112482
        inertia_zz=0.001112482 meshes=r_talus.vtp
      PinJoint ankle_r: parent_body=tibia_r location_in_parent=(-0.01127322 -0.4509289 0)
          orientation_in_parent=(0.1758952 -0.105208 0.01866219) location=(0 0 0)
          orientation=(0.1758952 -0.105208 0.01866219)
        Coordinate ankle_angle_r: motion_type=rotational default_value=0 range=(-0.6981317 0.5235988) clamped=true
    Body calcn_r: mass=1.062481 mass_center=(0.103913 0.0378757 0) inertia_xx=0.001830023 inertia_yy=0.003851986
        inertia_zz=0.003851986 meshes=r_foot.vtp
      PinJoint subtalar_r: parent_body=talus_r location_in_parent=(-0.05067833 -0.05296282 0.009647246)
          orientation_in_parent=(-1.768191 0.906223 1.819602) location=(0 0 0)
          orientation=(-1.768191 0.906223 1.819602)
        Coordinate subtalar_angle_r: motion_type=rotational default_value=0 range=(-0.3490659 0.3490659) clamped=true
            locked=true
    Body toes_r: mass=0.1841067 mass_center=(0.0359539 0.00757514 -0.0213165) inertia_xx=0.0001307159
        inertia_yy=0.0002030286 inertia_zz=0.0002030286 meshes=r_bofoot.vtp
      PinJoint mtp_r: parent_body=calcn_r location_in_parent=(0.1857963 -0.002525045 0.001315534)
          orientation_in_parent=(-3.141593 0.6199005 0) location=(0 0 0) orientation=(-3.141593 0.6199005 0)
        Coordinate mtp_angle_r: motion_type=rotational default_value=0 range=(-0.5235988 0.5235988) clamped=true
            locked=true
    Body femur_l: mass=7.906048 mass_center=(0 -0.186335 0) inertia_xx=0.1367362 inertia_yy=0.03584347
        inertia_zz=0.1441908 meshes=l_femur.vtp
      CustomJoint hip_l: parent_body=pelvis location_in_parent=(-0.05948864 -0.06565777 -0.07726) location=(0 0 0)
        Coordinate hip_flexion_l: motion_type=rotational default_value=0 range=(-0.5235988 2.094395) clamped=true
        Coordinate hip_adduction_l: motion_type=rotational default_value=0 range=(-0.8726646 0.5235988) clamped=true
        Coordinate hip_rotation_l: motion_type=rotational default_value=0 range=(-0.6981317 0.6981317) clamped=true
        SpatialTransform: axes_held_at_zero=(translation1 translation2 translation3)
          TransformAxis rotation1: coordinates=hip_flexion_l axis=(0 0 1) LinearFunction(coefficients=1 0)
          TransformAxis rotation2: coordinates=hip_adduction_l axis=(1 0 0) LinearFunction(coefficients=-1 0)
          TransformAxis rotation3: coordinates=hip_rotation_l axis=(0 1 0) LinearFunction(coefficients=-1 0)
      WrapCylinder Gastroc_at_condyles_l: translation=(0.00548045 -0.449397 0) quadrant=all radius=0.02740223
          length=0.1096089
      WrapCylinder KnExt_at_fem_l: xyz_body_rotation=(0.0623366 -0.0507601 0)
          translation=(0.00393307 -0.44143 -0.00229204) quadrant=all radius=0.02740223 length=0.1096089
      WrapCylinder AB_at_femshaft_l: xyz_body_rotation=(-1.66157 -0.186644 0)
          translation=(0.0160505 -0.123414 -0.0256101) quadrant=all radius=0.01808547 length=0.07672624
      WrapCylinder AL_at_femshaft_l: xyz_body_rotation=(-1.77711 -0.136489 0)
          translation=(0.0336858 -0.254193 -0.016566) quadrant=all radius=0.02203139 length=0.1096089
      WrapCylinder AMprox_at_femshaft_l: xyz_body_rotation=(-1.61126 -0.18656 0)
          translation=(0.00568102 -0.0798992 -0.027844) quadrant=all radius=0.02312748 length=0.07672624
      WrapCylinder AMmid_at_femshaft_l: xyz_body_rotation=(-1.61139 -0.13656 0)
          translation=(0.0252238 -0.176154 -0.0225621) quadrant=all radius=0.02345631 length=0.1315307
      WrapCylinder AMdist_at_femshaft_l: xyz_body_rotation=(-1.71188 -0.186636 0)
          translation=(0.0346435 -0.28579 -0.0102644) quadrant=all radius=0.02389474 length=0.2192178
      WrapCylinder AMisch_at_condyles_l: xyz_body_rotation=(-1.71115 0.463363 0)
          translation=(-0.0248276 -0.41304 0.00345747) quadrant=all radius=0.04384357 length=0.2630614
      WrapCylinder PECT_at_femshaft_l: xyz_body_rotation=(-1.81295 -0.276344 0)
          translation=(0.0066705 -0.0926227 -0.0333655) quadrant=all radius=0.01644134 length=0.05480446
    Body tibia_l: mass=3.151318 mass_center=(0 -0.210471 0) inertia_xx=0.05444248 inertia_yy=0.00550906
        inertia_zz=0.05519862 meshes=(l_tibia.vtp l_fibula.vtp)
      CustomJoint walker_knee_l: parent_body=femur_l location_in_parent=(-0.008867361 -0.4471605 0.003014245)
          orientation_in_parent=(1.641568 -1.446181 1.570796) location=(-0.009119519 -0.003984859 0.001673781)
          orientation=(1.641568 -1.446181 1.570796)
        Coordinate knee_angle_l: motion_type=rotational default_value=0 range=(0 2.0944) clamped=false
        SpatialTransform: axes_held_at_zero=translation3
          TransformAxis rotation1: coordinates=knee_angle_l axis=(-1 0 0) LinearFunction(coefficients=1 0)
          TransformAxis rotation2: coordinates=knee_angle_l axis=(0 0 1)
            SimmSpline: x=(0 0.174533 0.349066 0.523599 0.698132 0.872665 1.0472 1.22173 1.39626 1.5708 1.74533 1.91986 2.0944)
                y=(0 0.0126809 0.0226969 0.0296054 0.0332049 0.0335354 0.0308779 0.0257548 0.0189295 0.011407 0.00443314 -0.00050475 -0.0016782)
          TransformAxis rotation3: coordinates=knee_angle_l axis=(0 1 0)
            SimmSpline: x=(0 0.174533 0.349066 0.523599 0.698132 0.872665 1.0472 1.22173 1.39626 1.5708 1.74533 1.91986 2.0944)
                y=(0 -0.059461 -0.109399 -0.150618 -0.18392 -0.210107 -0.229983 -0.24435 -0.254012 -0.25977 -0.262428 -0.262788 -0.261654)
          TransformAxis translation1: coordinates=knee_angle_l axis=(0 1 0)
            MultiplierFunction: scale=1.096089
              SimmSpline: x=(0 0.174533 0.349066 0.523599 0.698132 0.872665 1.0472 1.22173 1.39626 1.5708 1.74533 1.91986 2.0944)
                  y=(0 0.000479 0.000835 0.001086 0.001251 0.001346 0.001391 0.001403 0.0014 0.0014 0.001421 0.001481 0.001599)
          TransformAxis translation2: coordinates=knee_angle_l axis=(0 0 1)
            MultiplierFunction: scale=1.096089
              SimmSpline: x=(0 0.174533 0.349066 0.523599 0.698132 0.872665 1.0472 1.22173 1.39626 1.5708 1.74533 1.91986 2.0944)
                  y=(0 -0.000988 -0.001899 -0.002734 -0.003492 -0.004173 -0.004777 -0.005305 -0.005756 -0.00613 -0.006427 -0.006648 -0.006792)
      WrapCylinder GasLat_at_shank_l: xyz_body_rotation=(-2.96723 0.279725 -1.47812)
          translation=(-0.00834219 -0.0834219 0.00372016) quadrant=-y radius=0.06200273 length=0.1127322
      WrapCylinder GasMed_at_shank_l: xyz_body_rotation=(-2.96723 -0.0279725 -1.47812)
          translation=(-0.00834219 -0.0834219 0.00372016) quadrant=-y radius=0.06200273 length=0.1127322
      WrapCylinder GR_at_condyles_l: xyz_body_rotation=(0 0.4 0) translation=(-0.00338197 -0.0225464 0) quadrant=all
          radius=0.0405836 length=0.1127322
      WrapCylinder SM_at_condyles_l: xyz_body_rotation=(0 0.1 0) translation=(-0.00112732 -0.0225464 0) quadrant=all
          radius=0.03968175 length=0.1127322
      WrapCylinder ST_at_condyles_l: xyz_body_rotation=(0 0.2 0) translation=(-0.00225464 -0.0231101 0) quadrant=all
          radius=0.0479112 length=0.1127322
      WrapCylinder BF_at_gastroc_l: translation=(-0.0653847 -0.0676393 0) quadrant=all radius=0.03381967
          length=0.1690983
    Body patella_l: mass=0.07326868 mass_center=(0.00197296 0.0289368 0) inertia_xx=2.93079e-6 inertia_yy=1.338769e-5
        inertia_zz=1.338769e-5 meshes=l_pat.vtp
      CustomJoint patellofemoral_l: parent_body=femur_l location_in_parent=(-0.008867361 -0.4471605 0.003014245)
          location=(0 0 0)
        Coordinate knee_angle_l_beta: motion_type=rotational default_value=0 range=(-99999.9 99999.9) clamped=false
        SpatialTransform: axes_held_at_zero=(rotation2 rotation3)
          TransformAxis rotation1: coordinates=knee_angle_l_beta axis=(0 0 1)
            SimmSpline f25: x=(0 0.174533 0.349066 0.523599 0.698132 0.872665 1.0472 1.22173 1.39626 1.5708 1.74533 1.91986 2.0944)
                y=(0.00113686 -0.00629212 -0.105582 -0.253683 -0.414245 -0.579047 -0.747244 -0.91799 -1.09044 -1.26379 -1.43763 -1.61186 -1.78634)
          TransformAxis translation1: coordinates=knee_angle_l_beta axis=(1 0 0)
            MultiplierFunction: scale=1.096089
              SimmSpline f23: x=(0 0.174533 0.349066 0.523599 0.698132 0.872665 1.0472 1.22173 1.39626 1.5708 1.74533 1.91986 2.0944)
                  y=(0.0524 0.0488 0.0437 0.0371 0.0296 0.0216 0.0136 0.0057 -0.0019 -0.0088 -0.0148 -0.0196 -0.0227)
          TransformAxis translation2: coordinates=knee_angle_l_beta axis=(0 1 0)
            MultiplierFunction: scale=1.096089
              SimmSpline f24: x=(0 0.174533 0.349066 0.523599 0.698132 0.872665 1.0472 1.22173 1.39626 1.5708 1.74533 1.91986 2.0944)
                  y=(-0.0108 -0.019 -0.0263 -0.0322 -0.0367 -0.0395 -0.0408 -0.0404 -0.0384 -0.0349 -0.0301 -0.0245 -0.0187)
          TransformAxis translation3: axis=(0 0 1) MultiplierFunction(scale=1.096089, Constant(value=-0.00275))
    Body talus_l: mass=0.08499847 mass_center=(0 0 0) inertia_xx=0.001307159 inertia_yy=0.001112482
        inertia_zz=0.001112482 meshes=l_talus.vtp
      PinJoint ankle_l: parent_body=tibia_l location_in_parent=(-0.01127322 -0.4509289 0)
          orientation_in_parent=(-0.1758952 0.105208 0.01866219) location=(0 0 0)
          orientation=(-0.1758952 0.105208 0.01866219)
        Coordinate ankle_angle_l: motion_type=rotational default_value=0 range=(-0.6981317 0.5235988) clamped=true
    Body calcn_l: mass=1.062481 mass_center=(0.103913 0.0378757 0) inertia_xx=0.001830023 inertia_yy=0.003851986
        inertia_zz=0.003851986 meshes=l_foot.vtp
      PinJoint subtalar_l: parent_body=talus_l location_in_parent=(-0.05067833 -0.05296282 -0.009647246)
          orientation_in_parent=(1.768191 -0.906223 1.819602) location=(0 0 0)
          orientation=(1.768191 -0.906223 1.819602)
        Coordinate subtalar_angle_l: motion_type=rotational default_value=0 range=(-0.3490659 0.3490659) clamped=true
            locked=true
    Body toes_l: mass=0.1841067 mass_center=(0.0359539 0.00757514 0.0213165) inertia_xx=0.0001307159
        inertia_yy=0.0002030286 inertia_zz=0.0002030286 meshes=l_bofoot.vtp
      PinJoint mtp_l: parent_body=calcn_l location_in_parent=(0.1857963 -0.002525045 -0.001315534)
          orientation_in_parent=(-3.141593 -0.6199005 0) location=(0 0 0) orientation=(-3.141593 -0.6199005 0)
        Coordinate mtp_angle_l: motion_type=rotational default_value=0 range=(-0.5235988 0.5235988) clamped=true
            locked=true
    Body torso: mass=22.76623 mass_center=(-0.00805548 0.3424 -0.00212134) inertia_xx=1.430938 inertia_yy=0.7272777
        inertia_zz=1.430938 meshes=(hat_spine.vtp hat_jaw.vtp hat_skull.vtp hat_ribs_scap.vtp)
      CustomJoint back: parent_body=pelvis location_in_parent=(-0.1064487 0.06817567 0) location=(0 0 0)
        Coordinate lumbar_extension: motion_type=rotational default_value=0 range=(-1.570796 1.570796) clamped=true
        Coordinate lumbar_bending: motion_type=rotational default_value=0 range=(-1.570796 1.570796) clamped=true
        Coordinate lumbar_rotation: motion_type=rotational default_value=0 range=(-1.570796 1.570796) clamped=true
        SpatialTransform: axes_held_at_zero=(translation1 translation2 translation3)
          TransformAxis rotation1: coordinates=lumbar_extension axis=(0 0 1) LinearFunction(coefficients=1 0)
          TransformAxis rotation2: coordinates=lumbar_bending axis=(1 0 0) LinearFunction(coefficients=1 0)
          TransformAxis rotation3: coordinates=lumbar_rotation axis=(0 1 0) LinearFunction(coefficients=1 0)
    Body humerus_r: mass=1.727594 mass_center=(0 -0.184297 0) inertia_xx=0.01274458 inertia_yy=0.004396486
        inertia_zz=0.01430538 meshes=humerus_rv.vtp
      CustomJoint acromial_r: parent_body=torso location_in_parent=(0.003357583 0.397505 0.1809157) location=(0 0 0)
        Coordinate arm_flex_r: motion_type=rotational default_value=0 range=(-1.570796 1.570796) clamped=true
        Coordinate arm_add_r: motion_type=rotational default_value=0 range=(-2.094395 1.570796) clamped=true
        Coordinate arm_rot_r: motion_type=rotational default_value=0 range=(-1.570796 1.570796) clamped=true
        SpatialTransform: axes_held_at_zero=(translation1 translation2 translation3)
          TransformAxis rotation1: coordinates=arm_flex_r axis=(0 0 1) LinearFunction(coefficients=1 0)
          TransformAxis rotation2: coordinates=arm_add_r axis=(1 0 0) LinearFunction(coefficients=1 0)
          TransformAxis rotation3: coordinates=arm_rot_r axis=(0 1 0) LinearFunction(coefficients=1 0)
    Body ulna_r: mass=0.5163657 mass_center=(0 -0.118087 0) inertia_xx=0.002416845 inertia_yy=0.0005042574
        inertia_zz=0.002621649 meshes=ulna_rv.vtp
      PinJoint elbow_r: parent_body=humerus_r location_in_parent=(0.01472562 -0.3207202 -0.01074957)
          orientation_in_parent=(-0.02286271 0.2280177 0.005168901) location=(0 0 0)
          orientation=(-0.02286271 0.2280177 0.005168901)
        Coordinate elbow_flex_r: motion_type=rotational default_value=0 range=(0 2.618) clamped=true
    Body radius_r: mass=0.5163657 mass_center=(0 -0.118087 0) inertia_xx=0.002416845 inertia_yy=0.0005042574
        inertia_zz=0.002621649 meshes=radius_rv.vtp
      PinJoint radioulnar_r: parent_body=ulna_r location_in_parent=(-0.006590946 -0.01274393 0.02555547)
          orientation_in_parent=(-1.568841 0.05642797 1.536144) location=(0 0 0)
          orientation=(-1.568841 0.05642797 1.536144)
        Coordinate pro_sup_r: motion_type=rotational default_value=0 range=(0 1.570796) clamped=true
    Body hand_r: mass=0.388868 mass_center=(0 -0.068095 0) inertia_xx=0.0007581864 inertia_yy=0.0004649417
        inertia_zz=0.00113898
        meshes=(pisiform_rvs.vtp lunate_rvs.vtp scaphoid_rvs.vtp triquetrum_rvs.vtp hamate_rvs.vtp capitate_rvs.vtp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)
      UniversalJoint radius_hand_r: parent_body=radius_r location_in_parent=(-0.008619081 -0.2310711 0.01333474)
          orientation_in_parent=(-1.570796 0 -1.570796) location=(0 0 0) orientation=(-1.570796 0 -1.570796)
        Coordinate wrist_flex_r: motion_type=rotational default_value=0 range=(-1.22173 1.22173) clamped=true
            locked=true
        Coordinate wrist_dev_r: motion_type=rotational default_value=0 range=(-0.4363323 0.6108652) clamped=true
            locked=true
    Body humerus_l: mass=1.727594 mass_center=(0 -0.184297 0) inertia_xx=0.01274458 inertia_yy=0.004396486
        inertia_zz=0.01430538 meshes=humerus_lv.vtp
      CustomJoint acromial_l: parent_body=torso location_in_parent=(0.003357583 0.397505 -0.1809157) location=(0 0 0)
        Coordinate arm_flex_l: motion_type=rotational default_value=0 range=(-1.570796 1.570796) clamped=true
        Coordinate arm_add_l: motion_type=rotational default_value=0 range=(-2.094395 1.570796) clamped=true
        Coordinate arm_rot_l: motion_type=rotational default_value=0 range=(-1.570796 1.570796) clamped=true
        SpatialTransform: axes_held_at_zero=(translation1 translation2 translation3)
          TransformAxis rotation1: coordinates=arm_flex_l axis=(0 0 1) LinearFunction(coefficients=1 0)
          TransformAxis rotation2: coordinates=arm_add_l axis=(-1 0 0) LinearFunction(coefficients=1 0)
          TransformAxis rotation3: coordinates=arm_rot_l axis=(0 -1 0) LinearFunction(coefficients=1 0)
    Body ulna_l: mass=0.5163657 mass_center=(0 -0.118087 0) inertia_xx=0.002416845 inertia_yy=0.0005042574
        inertia_zz=0.002621649 meshes=ulna_lv.vtp
      PinJoint elbow_l: parent_body=humerus_l location_in_parent=(0.01472562 -0.3207202 0.01074957)
          orientation_in_parent=(0.02286271 -0.2280177 0.005168901) location=(0 0 0)
          orientation=(0.02286271 -0.2280177 0.005168901)
        Coordinate elbow_flex_l: motion_type=rotational default_value=0 range=(0 2.618) clamped=true
    Body radius_l: mass=0.5163657 mass_center=(0 -0.118087 0) inertia_xx=0.002416845 inertia_yy=0.0005042574
        inertia_zz=0.002621649 meshes=radius_lv.vtp
      PinJoint radioulnar_l: parent_body=ulna_l location_in_parent=(-0.006590946 -0.01274393 -0.02555547)
          orientation_in_parent=(1.568841 -0.05642797 1.536144) location=(0 0 0)
          orientation=(1.568841 -0.05642797 1.536144)
        Coordinate pro_sup_l: motion_type=rotational default_value=0 range=(0 1.570796) clamped=true
    Body hand_l: mass=0.388868 mass_center=(0 -0.068095 0) inertia_xx=0.0007581864 inertia_yy=0.0004649417
        inertia_zz=0.00113898
        meshes=(pisiform_lvs.vtp lunate_lvs.vtp scaphoid_lvs.vtp triquetrum_lvs.vtp hamate_lvs.vtp capitate_lvs.vtp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)
      UniversalJoint radius_hand_l: parent_body=radius_l location_in_parent=(-0.008619081 -0.2310711 -0.01333474)
          orientation_in_parent=(1.570796 0 1.570796) location=(0 0 0) orientation=(1.570796 0 1.570796)
        Coordinate wrist_flex_l: motion_type=rotational default_value=0 range=(-1.22173 1.22173) clamped=true
            locked=true
        Coordinate wrist_dev_l: motion_type=rotational default_value=0 range=(-0.4363323 0.6108652) clamped=true
            locked=true
    Body backpack: mass=38.13857 mass_center=(0 0 0.00121839) inertia_xx=0.88102 inertia_yy=0.7486453
        inertia_zz=0.88102 meshes=backpack0.vtp
      WeldJoint duct_tape: parent_body=torso location_in_parent=(0 0.13 0) location=(0 0 0)
  ConstraintSet:
    CoordinateCouplerConstraint patellofemoral_knee_angle_r_con: independent_coordinate_names=knee_angle_r
        dependent_coordinate_name=knee_angle_r_beta scale_factor=1
        coupled_coordinates_function=LinearFunction(coefficients=1 0)
    CoordinateCouplerConstraint patellofemoral_knee_angle_l_con: independent_coordinate_names=knee_angle_l
        dependent_coordinate_name=knee_angle_l_beta scale_factor=1
        coupled_coordinates_function=LinearFunction(coefficients=1 0)
  ForceSet:
    Millard2012EquilibriumMuscle [values shared by the 80 below unless stated]: fiber_damping=0.01
        default_activation=0.01 minimum_activation=0.01
      ActiveForceLengthCurve: min_norm_active_fiber_length=0.25 transition_norm_fiber_length=0.77
          max_norm_active_fiber_length=1.9 shallow_ascending_slope=0.75 minimum_value=0
      ForceVelocityCurve: concentric_slope_at_vmax=0 concentric_slope_near_vmax=0.25 isometric_slope=5
          eccentric_slope_at_vmax=0 eccentric_slope_near_vmax=0.15 max_eccentric_velocity_force_multiplier=1.4
      FiberForceLengthCurve: strain_at_zero_force=0 strain_at_one_norm_force=0.7
      TendonForceLengthCurve
    Millard2012EquilibriumMuscle add_brev_r: max_isometric_force=287.569 optimal_fiber_length=0.1123209
        tendon_slack_length=0.03862083 pennation_angle_at_optimal=0.1147809 ignore_tendon_compliance=true
      PathPoint addbrev_r-P1: pelvis (-0.0201904 -0.0786321 0.0154)
      PathPoint addbrev_r-P2: femur_r (-0.00219218 -0.129339 0.0272926)
      PathWrap: wrap_object=AB_at_femshaft_r method=hybrid
    Millard2012EquilibriumMuscle add_long_r: max_isometric_force=421.2767 optimal_fiber_length=0.118873
        tendon_slack_length=0.1448002 pennation_angle_at_optimal=0.1377704
      PathPoint addlong_r-P1: pelvis (-0.00801272 -0.0743659 0.01888)
      PathPoint addlong_r-P2: femur_r (0.012342 -0.262371 0.0173511)
      PathWrap: wrap_object=AL_at_femshaft_r method=hybrid
    Millard2012EquilibriumMuscle add_mag3_r: max_isometric_force=274.4617 optimal_fiber_length=0.2032646
        tendon_slack_length=0.1002337 pennation_angle_at_optimal=0.194705 ignore_tendon_compliance=true
      PathPoint addmagDist_r-P1: pelvis (-0.0782667 -0.106797 0.03982)
      PathPoint addmagDist_r-P2: femur_r (0.012331 -0.287723 0.0211545)
      PathWrap: wrap_object=AMdist_at_femshaft_r method=hybrid
    Millard2012EquilibriumMuscle add_mag4_r: max_isometric_force=274.4617 optimal_fiber_length=0.1772471
        tendon_slack_length=0.245494 pennation_angle_at_optimal=0.1680443
      PathPoint addmagIsch_r-P1: pelvis (-0.0947362 -0.108546 0.04171)
      PathPoint addmagIsch_r-P2: femur_r (0.00527219 -0.42525 -0.035875)
      PathWrap: wrap_object=AMisch_at_condyles_r method=hybrid
    Millard2012EquilibriumMuscle add_mag2_r: max_isometric_force=274.4617 optimal_fiber_length=0.1576346
        tendon_slack_length=0.05337793 pennation_angle_at_optimal=0.2073076 ignore_tendon_compliance=true
      PathPoint addmagMid_r-P1: pelvis (-0.0556662 -0.101009 0.02854)
      PathPoint addmagMid_r-P2: femur_r (0.00265254 -0.178005 0.0320277)
      PathWrap: wrap_object=AMmid_at_femshaft_r method=hybrid
    Millard2012EquilibriumMuscle add_mag1_r: max_isometric_force=274.4617 optimal_fiber_length=0.1142466
        tendon_slack_length=0.04362587 pennation_angle_at_optimal=0.3114833 ignore_tendon_compliance=true
      PathPoint addmagProx_r-P1: pelvis (-0.0327486 -0.0899668 0.01365)
      PathPoint addmagProx_r-P2: femur_r (-0.0167373 -0.0864376 0.0350968)
      PathWrap: wrap_object=AMprox_at_femshaft_r method=hybrid
    Millard2012EquilibriumMuscle bifemlh_r: max_isometric_force=603.418 optimal_fiber_length=0.109729
        tendon_slack_length=0.3656435 pennation_angle_at_optimal=0.1759182
      PathPoint bflh_r-P1: pelvis (-0.109937 -0.0996285 0.0586)
      PathPoint bflh_r-P2: tibia_r (-0.0379908 -0.0394563 0.0285213)
      PathPoint bflh_r-P3: tibia_r (-0.0323542 -0.0512932 0.0341579)
    Millard2012EquilibriumMuscle bifemsh_r: max_isometric_force=255.9985 optimal_fiber_length=0.1215104
        tendon_slack_length=0.116572 pennation_angle_at_optimal=0.2642232 ignore_tendon_compliance=true
      PathPoint bfsh_r-P1: femur_r (0.00548045 -0.231384 0.0256485)
      PathPoint bfsh_r-P2: tibia_r (-0.0339324 -0.0472348 0.0358488)
      PathWrap: wrap_object=BF_at_gastroc_r method=hybrid
    Millard2012EquilibriumMuscle ext_dig_r: max_isometric_force=277.3121 optimal_fiber_length=0.0766438
        tendon_slack_length=0.4079654 pennation_angle_at_optimal=0.2182582
      PathPoint edl_r-P1: tibia_r (-0.0180372 -0.130431 0.0231101)
      PathPoint edl_r-P2: tibia_r (0.0184881 -0.423873 0.012626)
      PathPoint edl_r-P3: calcn_r (0.095496 0.0454508 0.000974469)
      PathPoint edl_r-P4: calcn_r (0.167923 0.00694387 0.0158351)
      PathPoint edl_r-P5: toes_r (0.000311739 0.00593386 0.0186367)
      PathPoint edl_r-P6: toes_r (0.0460334 -0.000505009 0.0304522)
    Millard2012EquilibriumMuscle ext_hal_r: max_isometric_force=131.3583 optimal_fiber_length=0.08237388
        tendon_slack_length=0.359885 pennation_angle_at_optimal=0.1972681
      PathPoint ehl_r-P1: tibia_r (-0.0157825 -0.174735 0.0213064)
      PathPoint ehl_r-P2: tibia_r (0.00800399 -0.327938 0.0184881)
      PathPoint ehl_r-P3: tibia_r (0.0225464 -0.41632 -0.0031565)
      PathPoint ehl_r-P4: calcn_r (0.100796 0.0491121 -0.0257016)
      PathPoint ehl_r-P5: calcn_r (0.134359 0.0390119 -0.0313048)
      PathPoint ehl_r-P6: calcn_r (0.180185 0.0175491 -0.0341064)
      PathPoint ehl_r-P7: toes_r (0.0309661 0.00517634 -0.0298431)
      PathPoint ehl_r-P8: toes_r (0.058503 0.00429258 -0.0226564)
    Millard2012EquilibriumMuscle flex_dig_r: max_isometric_force=194.4531 optimal_fiber_length=0.04932507
        tendon_slack_length=0.4189013 pennation_angle_at_optimal=0.2248391
      PathPoint fdl_r-P1: tibia_r (-0.00259284 -0.206525 -0.00202918)
      PathPoint fdl_r-P2: tibia_r (-0.0198409 -0.410909 -0.0139788)
      PathPoint fdl_r-P3: calcn_r (0.045306 0.0397695 -0.0341064)
      PathPoint fdl_r-P4: calcn_r (0.0735703 0.0222204 -0.0320357)
      PathPoint fdl_r-P5: calcn_r (0.172288 -0.0102264 0.0141298)
      PathPoint fdl_r-P6: toes_r (-0.00197435 -0.00984768 0.0179059)
      PathPoint fdl_r-P7: toes_r (0.0296152 -0.00896391 0.0261889)
      PathPoint fdl_r-P8: toes_r (0.0458256 -0.00757514 0.0294777)
    Millard2012EquilibriumMuscle flex_hal_r: max_isometric_force=417.1592 optimal_fiber_length=0.05770607
        tendon_slack_length=0.387999 pennation_angle_at_optimal=0.2580255
      PathPoint fhl_r-P1: tibia_r (-0.034947 -0.24384 0.0225464)
      PathPoint fhl_r-P2: tibia_r (-0.0272812 -0.41384 -0.00856765)
      PathPoint fhl_r-P3: calcn_r (0.0388634 0.0348456 -0.0293559)
      PathPoint fhl_r-P4: calcn_r (0.107862 0.00858515 -0.031183)
      PathPoint fhl_r-P5: calcn_r (0.179354 -0.00669137 -0.0327665)
      PathPoint fhl_r-P6: toes_r (0.0161065 -0.00808014 -0.0322793)
      PathPoint fhl_r-P7: toes_r (0.0583991 -0.0128777 -0.0220474)
    Millard2012EquilibriumMuscle lat_gas_r: max_isometric_force=723.7518 optimal_fiber_length=0.06638083
        tendon_slack_length=0.4245553 pennation_angle_at_optimal=0.2102268
      PathPoint gaslat_r-P1: femur_r (-0.00328827 -0.418048 0.0303617)
      PathPoint gaslat_r-P2: calcn_r (0.00457217 0.0391382 -0.00645586)
      PathWrap: wrap_object=GasLat_at_shank_r method=hybrid
      PathWrap: wrap_object=Gastroc_at_condyles_r method=hybrid
    Millard2012EquilibriumMuscle med_gas_r: max_isometric_force=1431.603 optimal_fiber_length=0.05754864
        tendon_slack_length=0.4499134 pennation_angle_at_optimal=0.1656816
      PathPoint gasmed_r-P1: femur_r (0.00876871 -0.415199 -0.0227987)
      PathPoint gasmed_r-P2: calcn_r (0.00457217 0.0391382 -0.00645586)
      PathWrap: wrap_object=GasMed_at_shank_r method=hybrid
      PathWrap: wrap_object=Gastroc_at_condyles_r method=hybrid
    Millard2012EquilibriumMuscle glut_max1_r: max_isometric_force=452.0562 optimal_fiber_length=0.1393601
        tendon_slack_length=0.04630251 pennation_angle_at_optimal=0.3540118 ignore_tendon_compliance=true
      PathPoint glmax1_r-P1: pelvis (-0.130127 0.0288596 0.0563)
      PathPoint glmax1_r-P2: pelvis (-0.132876 -0.0202436 0.0779)
      PathPoint glmax1_r-P3: femur_r (-0.0486664 -0.0357325 0.0331019)
      PathPoint glmax1_r-P4: femur_r (-0.0303617 -0.0620386 0.0515162)
      PathWrap: wrap_object=Gmax1_at_pelvis_r method=hybrid
    Millard2012EquilibriumMuscle glut_max2_r: max_isometric_force=646.089 optimal_fiber_length=0.1558651
        tendon_slack_length=0.06739643 pennation_angle_at_optimal=0.3673821 ignore_tendon_compliance=true
      PathPoint glmax2_r-P1: pelvis (-0.139218 0.00727765 0.0462)
      PathPoint glmax2_r-P2: pelvis (-0.142073 -0.0509435 0.0813)
      PathPoint glmax2_r-P3: femur_r (-0.049324 -0.0640116 0.0276214)
      PathPoint glmax2_r-P4: femur_r (-0.017099 -0.111363 0.0459261)
      PathWrap: wrap_object=Gmax2_at_pelvis_r method=hybrid
    Millard2012EquilibriumMuscle glut_max3_r: max_isometric_force=435.5003 optimal_fiber_length=0.17405
        tendon_slack_length=0.07265975 pennation_angle_at_optimal=0.3824161 ignore_tendon_compliance=true
      PathPoint glmax3_r-P1: pelvis (-0.137421 -0.0439168 0.009)
      PathPoint glmax3_r-P2: pelvis (-0.134567 -0.105651 0.0435)
      PathPoint glmax3_r-P3: femur_r (-0.0308001 -0.12331 0.0103032)
      PathPoint glmax3_r-P4: femur_r (-0.00657653 -0.155535 0.0450493)
      PathWrap: wrap_object=Gmax3_at_pelvis_r method=hybrid
    Millard2012EquilibriumMuscle glut_med1_r: max_isometric_force=502.4564 optimal_fiber_length=0.06511051
        tendon_slack_length=0.04978442 pennation_angle_at_optimal=0.3165559 ignore_tendon_compliance=true
      PathPoint glmed1_r-P1: pelvis (-0.0470404 0.0204945 0.1172)
      PathPoint glmed1_r-P2: femur_r (-0.0238947 -0.0128242 0.0608329)
    Millard2012EquilibriumMuscle glut_med2_r: max_isometric_force=351.5655 optimal_fiber_length=0.06619016
        tendon_slack_length=0.05916205 pennation_angle_at_optimal=0.3165559 ignore_tendon_compliance=true
      PathPoint glmed2_r-P1: pelvis (-0.0898524 0.0264338 0.0675)
      PathPoint glmed2_r-P2: femur_r (-0.0282791 -0.00635732 0.0577639)
    Millard2012EquilibriumMuscle glut_med3_r: max_isometric_force=400.3228 optimal_fiber_length=0.07071172
        tendon_slack_length=0.04381496 pennation_angle_at_optimal=0.3165559 ignore_tendon_compliance=true
      PathPoint glmed3_r-P1: pelvis (-0.121776 -0.00610653 0.0526)
      PathPoint glmed3_r-P2: femur_r (-0.0338692 -0.00515162 0.0567774)
    Millard2012EquilibriumMuscle glut_min1_r: max_isometric_force=171.877 optimal_fiber_length=0.06311264
        tendon_slack_length=0.01497791 pennation_angle_at_optimal=0.1745329 ignore_tendon_compliance=true
      PathPoint glmin1_r-P1: pelvis (-0.0490488 -0.012464 0.1042)
      PathPoint glmin1_r-P2: femur_r (-0.00789184 -0.0113993 0.061381)
    Millard2012EquilibriumMuscle glut_min2_r: max_isometric_force=181.4227 optimal_fiber_length=0.05219424
        tendon_slack_length=0.02432536 pennation_angle_at_optimal=0 ignore_tendon_compliance=true
      PathPoint glmin2_r-P1: pelvis (-0.0651166 -0.0118785 0.0971)
      PathPoint glmin2_r-P2: femur_r (-0.0105225 -0.0113993 0.061381)
    Millard2012EquilibriumMuscle glut_min3_r: max_isometric_force=205.296 optimal_fiber_length=0.03632649
        tendon_slack_length=0.04863209 pennation_angle_at_optimal=0.01745329
      PathPoint glmin3_r-P1: pelvis (-0.0834042 -0.0129659 0.0798)
      PathPoint glmin3_r-P2: femur_r (-0.0147972 -0.00909754 0.0602849)
    Millard2012EquilibriumMuscle grac_r: max_isometric_force=129.2648 optimal_fiber_length=0.2576965
        tendon_slack_length=0.1945889 pennation_angle_at_optimal=0.1720016 ignore_tendon_compliance=true
      PathPoint P1: pelvis (-0.0500637 -0.108178 0.02456)
      PathPoint P2: tibia_r (-0.0207653 -0.0536042 -0.03338)
      PathPoint P3: tibia_r (0.00200663 -0.0784842 -0.0177328)
      PathWrap: wrap_object=GR_at_condyles_r method=hybrid
    Millard2012EquilibriumMuscle iliacus_r: max_isometric_force=469.2222 optimal_fiber_length=0.1022297
        tendon_slack_length=0.09218002 pennation_angle_at_optimal=0.279914 ignore_tendon_compliance=true
      PathPoint P1: pelvis (-0.0639538 0.0258482 0.0843)
      PathPoint P2: pelvis (-0.0142707 -0.0465937 0.0756)
      PathPoint P3: femur_r (-0.00252101 -0.061929 0.0152356)
      PathPoint P4: femur_r (-0.0133723 -0.0698209 0.0214833)
      PathWrap: wrap_object=IL_at_brim_r method=hybrid range=(2 3)
    Millard2012EquilibriumMuscle per_brev_r: max_isometric_force=239.4962 optimal_fiber_length=0.05149293
        tendon_slack_length=0.1673265 pennation_angle_at_optimal=0.2052361
      PathPoint perbrev_r-P1: tibia_r (-0.0273939 -0.285438 0.0282958)
      PathPoint perbrev_r-P2: tibia_r (-0.0382162 -0.438867 0.0280703)
      PathPoint perbrev_r-P3: tibia_r (-0.0321287 -0.45138 0.0287467)
      PathPoint perbrev_r-P4: calcn_r (0.048943 0.0340881 0.0283814)
      PathPoint perbrev_r-P5: calcn_r (0.070349 0.0276492 0.0417804)
    Millard2012EquilibriumMuscle per_long_r: max_isometric_force=512.5218 optimal_fiber_length=0.05752597
        tendon_slack_length=0.3762071 pennation_angle_at_optimal=0.2479525
      PathPoint perlong_r-P1: tibia_r (-0.0225464 -0.154781 0.0317905)
      PathPoint perlong_r-P2: tibia_r (-0.0357361 -0.439656 0.0267175)
      PathPoint perlong_r-P3: tibia_r (-0.0306632 -0.452507 0.0270557)
      PathPoint perlong_r-P4: calcn_r (0.0455139 0.029038 0.0269197)
      PathPoint perlong_r-P5: calcn_r (0.0707647 0.0133827 0.0345937)
      PathPoint perlong_r-P6: calcn_r (0.0885338 0.00871141 0.0143734)
      PathPoint perlong_r-P7: calcn_r (0.125007 0.0107314 -0.0224128)
    Millard2012EquilibriumMuscle peri_r: max_isometric_force=473.195 optimal_fiber_length=0.02555655
        tendon_slack_length=0.1129464 pennation_angle_at_optimal=0.1745329
      PathPoint piri_r-P1: pelvis (-0.107622 -0.00546242 0.01351)
      PathPoint piri_r-P2: pelvis (-0.107844 -0.0256474 0.06092)
      PathPoint piri_r-P3: femur_r (-0.0162221 -0.00394592 0.0478991)
    Millard2012EquilibriumMuscle psoas_r: max_isometric_force=655.6211 optimal_fiber_length=0.1095615
        tendon_slack_length=0.09329424 pennation_angle_at_optimal=0.2155251 ignore_tendon_compliance=true
      PathPoint P1: pelvis (-0.0640595 0.0518637 0.039)
      PathPoint P2: pelvis (-0.0216703 -0.0547078 0.0656)
      PathPoint P3: femur_r (-0.0144684 -0.0511874 0.00504201)
      PathPoint P4: femur_r (-0.0257581 -0.0574351 0.00964558)
      PathWrap: wrap_object=PS_at_brim_r method=hybrid range=(2 3)
    Millard2012EquilibriumMuscle rect_fem_r: max_isometric_force=1007.122 optimal_fiber_length=0.08187909
        tendon_slack_length=0.483824 pennation_angle_at_optimal=0.2170149
      PathPoint recfem_r-P1: pelvis (-0.0253701 -0.0324566 0.0933)
      PathPoint recfem_r-P2: patella_r (0.0109609 0.0537084 0.000767262)
      PathPoint recfem_r-P3: patella_r (0.0132627 0.0478991 -0.00109609)
      PathPoint recfem_r-P4: patella_r (0.00548045 0.00270734 3.28827e-5)
      PathPoint recfem_r-P5: tibia_r (0.0367507 -0.0711566 -0.000529841)
      PathWrap: wrap_object=KnExt_at_fem_r method=hybrid
    Millard2012EquilibriumMuscle sar_r: max_isometric_force=114.6073 optimal_fiber_length=0.4325577
        tendon_slack_length=0.1330945 pennation_angle_at_optimal=0.02613542 ignore_tendon_compliance=true
      PathPoint sart_r-P1: pelvis (-0.0206132 -0.0130496 0.1056)
      PathPoint sart_r-P2: femur_r (-0.00328827 -0.391085 -0.0461454)
      PathPoint sart_r-P3: tibia_r (-0.0282958 -0.0452056 -0.0411473)
      PathPoint sart_r-P4: tibia_r (-0.0179244 -0.0675266 -0.0297613)
      PathPoint sart_r-P5: tibia_r (0.0153316 -0.0913131 -0.00293104)
    Millard2012EquilibriumMuscle semimem_r: max_isometric_force=1011.37 optimal_fiber_length=0.07737739
        tendon_slack_length=0.3897869 pennation_angle_at_optimal=0.2545615
      PathPoint P1: pelvis (-0.104335 -0.0953623 0.0614)
      PathPoint P2: tibia_r (-0.0326923 -0.0470093 -0.0220955)
      PathWrap: wrap_object=SM_at_condyles_r method=hybrid
    Millard2012EquilibriumMuscle semiten_r: max_isometric_force=271.7047 optimal_fiber_length=0.2179287
        tendon_slack_length=0.2791282 pennation_angle_at_optimal=0.241295
      PathPoint P1: pelvis (-0.109726 -0.104815 0.0515)
      PathPoint P2: tibia_r (-0.0351725 -0.057268 -0.0258157)
      PathPoint P3: tibia_r (0.00214191 -0.087142 -0.0131897)
      PathWrap: wrap_object=ST_at_condyles_r method=hybrid
    Millard2012EquilibriumMuscle soleus_r: max_isometric_force=2846.578 optimal_fiber_length=0.04972692
        tendon_slack_length=0.3127777 pennation_angle_at_optimal=0.3814289
      PathPoint P1: tibia_r (-0.00856765 -0.103263 0.0110478)
      PathPoint P2: calcn_r (0.00457217 0.0391382 -0.00645586)
    Millard2012EquilibriumMuscle tfl_r: max_isometric_force=188.9526 optimal_fiber_length=0.09992284
        tendon_slack_length=0.4727897 pennation_angle_at_optimal=0.05235988
      PathPoint P1: pelvis (-0.0328754 0.0179013 0.1241)
      PathPoint P2: femur_r (0.032225 -0.109061 0.0654365)
      PathPoint P3: femur_r (0.0117282 -0.443916 0.0355133)
      PathPoint P4: tibia_r (0.0121751 -0.0462202 0.0390054)
    Millard2012EquilibriumMuscle tib_ant_r: max_isometric_force=564.0239 optimal_fiber_length=0.07707861
        tendon_slack_length=0.2713675 pennation_angle_at_optimal=0.1951828
      PathPoint tibant_r-P1: tibia_r (0.0173608 -0.147905 0.0182626)
      PathPoint tibant_r-P2: tibia_r (0.0282958 -0.214868 0.0144297)
      PathPoint tibant_r-P3: tibia_r (0.0262666 -0.412487 -0.0148807)
      PathPoint tibant_r-P4: calcn_r (0.121162 0.0224729 -0.0371516)
    Millard2012EquilibriumMuscle tib_post_r: max_isometric_force=795.0192 optimal_fiber_length=0.04257724
        tendon_slack_length=0.3162651 pennation_angle_at_optimal=0.2264891
      PathPoint tibpost_r-P1: tibia_r (-0.00462202 -0.147003 0.0116114)
      PathPoint tibpost_r-P2: tibia_r (-0.0184881 -0.412036 -0.0197281)
      PathPoint tibpost_r-P3: calcn_r (0.0433317 0.0421683 -0.0348373)
      PathPoint tibpost_r-P4: calcn_r (0.0802208 0.0200741 -0.0342282)
    Millard2012EquilibriumMuscle vas_int_r: max_isometric_force=779.9503 optimal_fiber_length=0.1093358
        tendon_slack_length=0.2226472 pennation_angle_at_optimal=0.06309973
      PathPoint vasint_r-P1: femur_r (0.0317866 -0.210888 0.0339788)
      PathPoint vasint_r-P2: femur_r (0.036719 -0.228425 0.0312385)
      PathPoint vasint_r-P3: patella_r (0.00635732 0.0526123 -0.000657653)
      PathPoint vasint_r-P4: patella_r (0.00548045 0.00270734 -0.000427475)
      PathPoint vasint_r-P5: tibia_r (0.0367169 -0.0712468 0.000484749)
      PathWrap: wrap_object=KnExt_at_fem_r method=hybrid
    Millard2012EquilibriumMuscle vas_lat_r: max_isometric_force=2365.898 optimal_fiber_length=0.1094203
        tendon_slack_length=0.2428397 pennation_angle_at_optimal=0.2528673
      PathPoint vaslat_r-P1: femur_r (0.00526123 -0.203215 0.0382535)
      PathPoint vaslat_r-P2: femur_r (0.0294848 -0.283997 0.04483)
      PathPoint vaslat_r-P3: patella_r (0.0112897 0.0463646 0.0154549)
      PathPoint vaslat_r-P4: patella_r (0.00548045 0.00270734 0.00803433)
      PathPoint vaslat_r-P5: tibia_r (0.0366831 -0.0714497 0.00576062)
      PathWrap: wrap_object=KnExt_at_fem_r method=hybrid
    Millard2012EquilibriumMuscle vas_med_r: max_isometric_force=1262.646 optimal_fiber_length=0.1066042
        tendon_slack_length=0.2201511 pennation_angle_at_optimal=0.4222225
      PathPoint vasmed_r-P1: femur_r (0.0153452 -0.230069 0.0206065)
      PathPoint vasmed_r-P2: femur_r (0.0390208 -0.303507 0.00098648)
      PathPoint vasmed_r-P3: patella_r (0.00690536 0.048776 -0.0186335)
      PathPoint vasmed_r-P4: patella_r (0.00548045 0.00270734 -0.00931676)
      PathPoint vasmed_r-P5: tibia_r (0.0359616 -0.0716639 -0.00764325)
      PathWrap: wrap_object=KnExt_at_fem_r method=hybrid
    Millard2012EquilibriumMuscle add_brev_l: max_isometric_force=287.569 optimal_fiber_length=0.1123209
        tendon_slack_length=0.03862083 pennation_angle_at_optimal=0.1147809 ignore_tendon_compliance=true
      PathPoint addbrev_l-P1: pelvis (-0.0201904 -0.0786321 -0.0154)
      PathPoint addbrev_l-P2: femur_l (-0.00219218 -0.129339 -0.0272926)
      PathWrap: wrap_object=AB_at_femshaft_l method=hybrid
    Millard2012EquilibriumMuscle add_long_l: max_isometric_force=421.2767 optimal_fiber_length=0.118873
        tendon_slack_length=0.1448002 pennation_angle_at_optimal=0.1377704
      PathPoint addlong_l-P1: pelvis (-0.00801272 -0.0743659 -0.01888)
      PathPoint addlong_l-P2: femur_l (0.012342 -0.262371 -0.0173511)
      PathWrap: wrap_object=AL_at_femshaft_l method=hybrid
    Millard2012EquilibriumMuscle add_mag3_l: max_isometric_force=274.4617 optimal_fiber_length=0.2032646
        tendon_slack_length=0.1002337 pennation_angle_at_optimal=0.194705 ignore_tendon_compliance=true
      PathPoint addmagDist_l-P1: pelvis (-0.0782667 -0.106797 -0.03982)
      PathPoint addmagDist_l-P2: femur_l (0.012331 -0.287723 -0.0211545)
      PathWrap: wrap_object=AMdist_at_femshaft_l method=hybrid
    Millard2012EquilibriumMuscle add_mag4_l: max_isometric_force=274.4617 optimal_fiber_length=0.1772471
        tendon_slack_length=0.245494 pennation_angle_at_optimal=0.1680443
      PathPoint addmagIsch_l-P1: pelvis (-0.0947362 -0.108546 -0.04171)
      PathPoint addmagIsch_l-P2: femur_l (0.00527219 -0.42525 0.035875)
      PathWrap: wrap_object=AMisch_at_condyles_l method=hybrid
    Millard2012EquilibriumMuscle add_mag2_l: max_isometric_force=274.4617 optimal_fiber_length=0.1576346
        tendon_slack_length=0.05337793 pennation_angle_at_optimal=0.2073076 ignore_tendon_compliance=true
      PathPoint addmagMid_l-P1: pelvis (-0.0556662 -0.101009 -0.02854)
      PathPoint addmagMid_l-P2: femur_l (0.00265254 -0.178005 -0.0320277)
      PathWrap: wrap_object=AMmid_at_femshaft_l method=hybrid
    Millard2012EquilibriumMuscle add_mag1_l: max_isometric_force=274.4617 optimal_fiber_length=0.1142466
        tendon_slack_length=0.04362587 pennation_angle_at_optimal=0.3114833 ignore_tendon_compliance=true
      PathPoint addmagProx_l-P1: pelvis (-0.0327486 -0.0899668 -0.01365)
      PathPoint addmagProx_l-P2: femur_l (-0.0167373 -0.0864376 -0.0350968)
      PathWrap: wrap_object=AMprox_at_femshaft_l method=hybrid
    Millard2012EquilibriumMuscle bifemlh_l: max_isometric_force=603.418 optimal_fiber_length=0.109729
        tendon_slack_length=0.3656435 pennation_angle_at_optimal=0.1759182
      PathPoint bflh_l-P1: pelvis (-0.109937 -0.0996285 -0.0586)
      PathPoint bflh_l-P2: tibia_l (-0.0379908 -0.0394563 -0.0285213)
      PathPoint bflh_l-P3: tibia_l (-0.0323542 -0.0512932 -0.0341579)
    Millard2012EquilibriumMuscle bifemsh_l: max_isometric_force=255.9985 optimal_fiber_length=0.1215104
        tendon_slack_length=0.116572 pennation_angle_at_optimal=0.2642232 ignore_tendon_compliance=true
      PathPoint bfsh_l-P1: femur_l (0.00548045 -0.231384 -0.0256485)
      PathPoint bfsh_l-P2: tibia_l (-0.0339324 -0.0472348 -0.0358488)
      PathWrap: wrap_object=BF_at_gastroc_l method=hybrid
    Millard2012EquilibriumMuscle ext_dig_l: max_isometric_force=277.3121 optimal_fiber_length=0.0766438
        tendon_slack_length=0.4079654 pennation_angle_at_optimal=0.2182582
      PathPoint edl_l-P1: tibia_l (-0.0180372 -0.130431 -0.0231101)
      PathPoint edl_l-P2: tibia_l (0.0184881 -0.423873 -0.012626)
      PathPoint edl_l-P3: calcn_l (0.095496 0.0454508 -0.000974469)
      PathPoint edl_l-P4: calcn_l (0.167923 0.00694387 -0.0158351)
      PathPoint edl_l-P5: toes_l (0.000311739 0.00593386 -0.0186367)
      PathPoint edl_l-P6: toes_l (0.0460334 -0.000505009 -0.0304522)
    Millard2012EquilibriumMuscle ext_hal_l: max_isometric_force=131.3583 optimal_fiber_length=0.08237388
        tendon_slack_length=0.359885 pennation_angle_at_optimal=0.1972681
      PathPoint ehl_l-P1: tibia_l (-0.0157825 -0.174735 -0.0213064)
      PathPoint ehl_l-P2: tibia_l (0.00800399 -0.327938 -0.0184881)
      PathPoint ehl_l-P3: tibia_l (0.0225464 -0.41632 0.0031565)
      PathPoint ehl_l-P4: calcn_l (0.100796 0.0491121 0.0257016)
      PathPoint ehl_l-P5: calcn_l (0.134359 0.0390119 0.0313048)
      PathPoint ehl_l-P6: calcn_l (0.180185 0.0175491 0.0341064)
      PathPoint ehl_l-P7: toes_l (0.0309661 0.00517634 0.0298431)
      PathPoint ehl_l-P8: toes_l (0.058503 0.00429258 0.0226564)
    Millard2012EquilibriumMuscle flex_dig_l: max_isometric_force=194.4531 optimal_fiber_length=0.04932507
        tendon_slack_length=0.4189013 pennation_angle_at_optimal=0.2248391
      PathPoint fdl_l-P1: tibia_l (-0.00259284 -0.206525 0.00202918)
      PathPoint fdl_l-P2: tibia_l (-0.0198409 -0.410909 0.0139788)
      PathPoint fdl_l-P3: calcn_l (0.045306 0.0397695 0.0341064)
      PathPoint fdl_l-P4: calcn_l (0.0735703 0.0222204 0.0320357)
      PathPoint fdl_l-P5: calcn_l (0.172288 -0.0102264 -0.0141298)
      PathPoint fdl_l-P6: toes_l (-0.00197435 -0.00984768 -0.0179059)
      PathPoint fdl_l-P7: toes_l (0.0296152 -0.00896391 -0.0261889)
      PathPoint fdl_l-P8: toes_l (0.0458256 -0.00757514 -0.0294777)
    Millard2012EquilibriumMuscle flex_hal_l: max_isometric_force=417.1592 optimal_fiber_length=0.05770607
        tendon_slack_length=0.387999 pennation_angle_at_optimal=0.2580255
      PathPoint fhl_l-P1: tibia_l (-0.034947 -0.24384 -0.0225464)
      PathPoint fhl_l-P2: tibia_l (-0.0272812 -0.41384 0.00856765)
      PathPoint fhl_l-P3: calcn_l (0.0388634 0.0348456 0.0293559)
      PathPoint fhl_l-P4: calcn_l (0.107862 0.00858515 0.031183)
      PathPoint fhl_l-P5: calcn_l (0.179354 -0.00669137 0.0327665)
      PathPoint fhl_l-P6: toes_l (0.0161065 -0.00808014 0.0322793)
      PathPoint fhl_l-P7: toes_l (0.0583991 -0.0128777 0.0220474)
    Millard2012EquilibriumMuscle lat_gas_l: max_isometric_force=723.7518 optimal_fiber_length=0.06638083
        tendon_slack_length=0.4245553 pennation_angle_at_optimal=0.2102268
      PathPoint gaslat_l-P1: femur_l (-0.00328827 -0.418048 -0.0303617)
      PathPoint gaslat_l-P2: calcn_l (0.00457217 0.0391382 0.00645586)
      PathWrap: wrap_object=GasLat_at_shank_l method=hybrid
      PathWrap: wrap_object=Gastroc_at_condyles_l method=hybrid
    Millard2012EquilibriumMuscle med_gas_l: max_isometric_force=1431.603 optimal_fiber_length=0.05754864
        tendon_slack_length=0.4499134 pennation_angle_at_optimal=0.1656816
      PathPoint gasmed_l-P1: femur_l (0.00876871 -0.415199 0.0227987)
      PathPoint gasmed_l-P2: calcn_l (0.00457217 0.0391382 0.00645586)
      PathWrap: wrap_object=GasMed_at_shank_l method=hybrid
      PathWrap: wrap_object=Gastroc_at_condyles_l method=hybrid
    Millard2012EquilibriumMuscle glut_max1_l: max_isometric_force=452.0562 optimal_fiber_length=0.1393601
        tendon_slack_length=0.04630251 pennation_angle_at_optimal=0.3540118 ignore_tendon_compliance=true
      PathPoint glmax1_l-P1: pelvis (-0.130127 0.0288596 -0.0563)
      PathPoint glmax1_l-P2: pelvis (-0.132876 -0.0202436 -0.0779)
      PathPoint glmax1_l-P3: femur_l (-0.0486664 -0.0357325 -0.0331019)
      PathPoint glmax1_l-P4: femur_l (-0.0303617 -0.0620386 -0.0515162)
      PathWrap: wrap_object=Gmax1_at_pelvis_l method=hybrid
    Millard2012EquilibriumMuscle glut_max2_l: max_isometric_force=646.089 optimal_fiber_length=0.1558651
        tendon_slack_length=0.06739643 pennation_angle_at_optimal=0.3673821 ignore_tendon_compliance=true
      PathPoint glmax2_l-P1: pelvis (-0.139218 0.00727765 -0.0462)
      PathPoint glmax2_l-P2: pelvis (-0.142073 -0.0509435 -0.0813)
      PathPoint glmax2_l-P3: femur_l (-0.049324 -0.0640116 -0.0276214)
      PathPoint glmax2_l-P4: femur_l (-0.017099 -0.111363 -0.0459261)
      PathWrap: wrap_object=Gmax2_at_pelvis_l method=hybrid
    Millard2012EquilibriumMuscle glut_max3_l: max_isometric_force=435.5003 optimal_fiber_length=0.17405
        tendon_slack_length=0.07265975 pennation_angle_at_optimal=0.3824161 ignore_tendon_compliance=true
      PathPoint glmax3_l-P1: pelvis (-0.137421 -0.0439168 -0.009)
      PathPoint glmax3_l-P2: pelvis (-0.134567 -0.105651 -0.0435)
      PathPoint glmax3_l-P3: femur_l (-0.0308001 -0.12331 -0.0103032)
      PathPoint glmax3_l-P4: femur_l (-0.00657653 -0.155535 -0.0450493)
      PathWrap: wrap_object=Gmax3_at_pelvis_l method=hybrid
    Millard2012EquilibriumMuscle glut_med1_l: max_isometric_force=502.4564 optimal_fiber_length=0.06511051
        tendon_slack_length=0.04978442 pennation_angle_at_optimal=0.3165559 ignore_tendon_compliance=true
      PathPoint glmed1_l-P1: pelvis (-0.0470404 0.0204945 -0.1172)
      PathPoint glmed1_l-P2: femur_l (-0.0238947 -0.0128242 -0.0608329)
    Millard2012EquilibriumMuscle glut_med2_l: max_isometric_force=351.5655 optimal_fiber_length=0.06619016
        tendon_slack_length=0.05916205 pennation_angle_at_optimal=0.3165559 ignore_tendon_compliance=true
      PathPoint glmed2_l-P1: pelvis (-0.0898524 0.0264338 -0.0675)
      PathPoint glmed2_l-P2: femur_l (-0.0282791 -0.00635732 -0.0577639)
    Millard2012EquilibriumMuscle glut_med3_l: max_isometric_force=400.3228 optimal_fiber_length=0.07071172
        tendon_slack_length=0.04381496 pennation_angle_at_optimal=0.3165559 ignore_tendon_compliance=true
      PathPoint glmed3_l-P1: pelvis (-0.121776 -0.00610653 -0.0526)
      PathPoint glmed3_l-P2: femur_l (-0.0338692 -0.00515162 -0.0567774)
    Millard2012EquilibriumMuscle glut_min1_l: max_isometric_force=171.877 optimal_fiber_length=0.06311264
        tendon_slack_length=0.01497791 pennation_angle_at_optimal=0.1745329 ignore_tendon_compliance=true
      PathPoint glmin1_l-P1: pelvis (-0.0490488 -0.012464 -0.1042)
      PathPoint glmin1_l-P2: femur_l (-0.00789184 -0.0113993 -0.061381)
    Millard2012EquilibriumMuscle glut_min2_l: max_isometric_force=181.4227 optimal_fiber_length=0.05219424
        tendon_slack_length=0.02432536 pennation_angle_at_optimal=0 ignore_tendon_compliance=true
      PathPoint glmin2_l-P1: pelvis (-0.0651166 -0.0118785 -0.0971)
      PathPoint glmin2_l-P2: femur_l (-0.0105225 -0.0113993 -0.061381)
    Millard2012EquilibriumMuscle glut_min3_l: max_isometric_force=205.296 optimal_fiber_length=0.03632649
        tendon_slack_length=0.04863209 pennation_angle_at_optimal=0.01745329
      PathPoint glmin3_l-P1: pelvis (-0.0834042 -0.0129659 -0.0798)
      PathPoint glmin3_l-P2: femur_l (-0.0147972 -0.00909754 -0.0602849)
    Millard2012EquilibriumMuscle grac_l: max_isometric_force=129.2648 optimal_fiber_length=0.2576965
        tendon_slack_length=0.1945889 pennation_angle_at_optimal=0.1720016 ignore_tendon_compliance=true
      PathPoint P1: pelvis (-0.0500637 -0.108178 -0.02456)
      PathPoint P2: tibia_l (-0.0207653 -0.0536042 0.03338)
      PathPoint P3: tibia_l (0.00200663 -0.0784842 0.0177328)
      PathWrap: wrap_object=GR_at_condyles_l method=hybrid
    Millard2012EquilibriumMuscle iliacus_l: max_isometric_force=469.2222 optimal_fiber_length=0.1022297
        tendon_slack_length=0.09218002 pennation_angle_at_optimal=0.279914 ignore_tendon_compliance=true
      PathPoint P1: pelvis (-0.0639538 0.0258482 -0.0843)
      PathPoint P2: pelvis (-0.0142707 -0.0465937 -0.0756)
      PathPoint P3: femur_l (-0.00252101 -0.061929 -0.0152356)
      PathPoint P4: femur_l (-0.0133723 -0.0698209 -0.0214833)
      PathWrap: wrap_object=IL_at_brim_l method=hybrid range=(2 3)
    Millard2012EquilibriumMuscle per_brev_l: max_isometric_force=239.4962 optimal_fiber_length=0.05149293
        tendon_slack_length=0.1673265 pennation_angle_at_optimal=0.2052361
      PathPoint perbrev_l-P1: tibia_l (-0.0273939 -0.285438 -0.0282958)
      PathPoint perbrev_l-P2: tibia_l (-0.0382162 -0.438867 -0.0280703)
      PathPoint perbrev_l-P3: tibia_l (-0.0321287 -0.45138 -0.0287467)
      PathPoint perbrev_l-P4: calcn_l (0.048943 0.0340881 -0.0283814)
      PathPoint perbrev_l-P5: calcn_l (0.070349 0.0276492 -0.0417804)
    Millard2012EquilibriumMuscle per_long_l: max_isometric_force=512.5218 optimal_fiber_length=0.05752597
        tendon_slack_length=0.3762071 pennation_angle_at_optimal=0.2479525
      PathPoint perlong_l-P1: tibia_l (-0.0225464 -0.154781 -0.0317905)
      PathPoint perlong_l-P2: tibia_l (-0.0357361 -0.439656 -0.0267175)
      PathPoint perlong_l-P3: tibia_l (-0.0306632 -0.452507 -0.0270557)
      PathPoint perlong_l-P4: calcn_l (0.0455139 0.029038 -0.0269197)
      PathPoint perlong_l-P5: calcn_l (0.0707647 0.0133827 -0.0345937)
      PathPoint perlong_l-P6: calcn_l (0.0885338 0.00871141 -0.0143734)
      PathPoint perlong_l-P7: calcn_l (0.125007 0.0107314 0.0224128)
    Millard2012EquilibriumMuscle peri_l: max_isometric_force=473.195 optimal_fiber_length=0.02555655
        tendon_slack_length=0.1129464 pennation_angle_at_optimal=0.1745329
      PathPoint piri_l-P1: pelvis (-0.107622 -0.00546242 -0.01351)
      PathPoint piri_l-P2: pelvis (-0.107844 -0.0256474 -0.06092)
      PathPoint piri_l-P3: femur_l (-0.0162221 -0.00394592 -0.0478991)
    Millard2012EquilibriumMuscle psoas_l: max_isometric_force=655.6211 optimal_fiber_length=0.1095615
        tendon_slack_length=0.09329424 pennation_angle_at_optimal=0.2155251 ignore_tendon_compliance=true
      PathPoint P1: pelvis (-0.0640595 0.0518637 -0.039)
      PathPoint P2: pelvis (-0.0216703 -0.0547078 -0.0656)
      PathPoint P3: femur_l (-0.0144684 -0.0511874 -0.00504201)
      PathPoint P4: femur_l (-0.0257581 -0.0574351 -0.00964558)
      PathWrap: wrap_object=PS_at_brim_l method=hybrid range=(2 3)
    Millard2012EquilibriumMuscle rect_fem_l: max_isometric_force=1007.122 optimal_fiber_length=0.08187909
        tendon_slack_length=0.483824 pennation_angle_at_optimal=0.2170149
      PathPoint recfem_l-P1: pelvis (-0.0253701 -0.0324566 -0.0933)
      PathPoint recfem_l-P2: patella_l (0.0109609 0.0537084 -0.000767262)
      PathPoint recfem_l-P3: patella_l (0.0132627 0.0478991 0.00109609)
      PathPoint recfem_l-P4: patella_l (0.00548045 0.00270734 -3.28827e-5)
      PathPoint recfem_l-P5: tibia_l (0.0367507 -0.0711566 0.000529841)
      PathWrap: wrap_object=KnExt_at_fem_l method=hybrid
    Millard2012EquilibriumMuscle sar_l: max_isometric_force=114.6073 optimal_fiber_length=0.4325577
        tendon_slack_length=0.1330945 pennation_angle_at_optimal=0.02613542 ignore_tendon_compliance=true
      PathPoint sart_l-P1: pelvis (-0.0206132 -0.0130496 -0.1056)
      PathPoint sart_l-P2: femur_l (-0.00328827 -0.391085 0.0461454)
      PathPoint sart_l-P3: tibia_l (-0.0282958 -0.0452056 0.0411473)
      PathPoint sart_l-P4: tibia_l (-0.0179244 -0.0675266 0.0297613)
      PathPoint sart_l-P5: tibia_l (0.0153316 -0.0913131 0.00293104)
    Millard2012EquilibriumMuscle semimem_l: max_isometric_force=1011.37 optimal_fiber_length=0.07737739
        tendon_slack_length=0.3897869 pennation_angle_at_optimal=0.2545615
      PathPoint P1: pelvis (-0.104335 -0.0953623 -0.0614)
      PathPoint P2: tibia_l (-0.0326923 -0.0470093 0.0220955)
      PathWrap: wrap_object=SM_at_condyles_l method=hybrid
    Millard2012EquilibriumMuscle semiten_l: max_isometric_force=271.7047 optimal_fiber_length=0.2179287
        tendon_slack_length=0.2791282 pennation_angle_at_optimal=0.241295
      PathPoint P1: pelvis (-0.109726 -0.104815 -0.0515)
      PathPoint P2: tibia_l (-0.0351725 -0.057268 0.0258157)
      PathPoint P3: tibia_l (0.00214191 -0.087142 0.0131897)
      PathWrap: wrap_object=ST_at_condyles_l method=hybrid
    Millard2012EquilibriumMuscle soleus_l: max_isometric_force=2846.578 optimal_fiber_length=0.04972692
        tendon_slack_length=0.3127777 pennation_angle_at_optimal=0.3814289
      PathPoint P1: tibia_l (-0.00856765 -0.103263 -0.0110478)
      PathPoint P2: calcn_l (0.00457217 0.0391382 0.00645586)
    Millard2012EquilibriumMuscle tfl_l: max_isometric_force=188.9526 optimal_fiber_length=0.09992284
        tendon_slack_length=0.4727897 pennation_angle_at_optimal=0.05235988
      PathPoint P1: pelvis (-0.0328754 0.0179013 -0.1241)
      PathPoint P2: femur_l (0.032225 -0.109061 -0.0654365)
      PathPoint P3: femur_l (0.0117282 -0.443916 -0.0355133)
      PathPoint P4: tibia_l (0.0121751 -0.0462202 -0.0390054)
    Millard2012EquilibriumMuscle tib_ant_l: max_isometric_force=564.0239 optimal_fiber_length=0.07707861
        tendon_slack_length=0.2713675 pennation_angle_at_optimal=0.1951828
      PathPoint tibant_l-P1: tibia_l (0.0173608 -0.147905 -0.0182626)
      PathPoint tibant_l-P2: tibia_l (0.0282958 -0.214868 -0.0144297)
      PathPoint tibant_l-P3: tibia_l (0.0262666 -0.412487 0.0148807)
      PathPoint tibant_l-P4: calcn_l (0.121162 0.0224729 0.0371516)
    Millard2012EquilibriumMuscle tib_post_l: max_isometric_force=795.0192 optimal_fiber_length=0.04257724
        tendon_slack_length=0.3162651 pennation_angle_at_optimal=0.2264891
      PathPoint tibpost_l-P1: tibia_l (-0.00462202 -0.147003 -0.0116114)
      PathPoint tibpost_l-P2: tibia_l (-0.0184881 -0.412036 0.0197281)
      PathPoint tibpost_l-P3: calcn_l (0.0433317 0.0421683 0.0348373)
      PathPoint tibpost_l-P4: calcn_l (0.0802208 0.0200741 0.0342282)
    Millard2012EquilibriumMuscle vas_int_l: max_isometric_force=779.9503 optimal_fiber_length=0.1093358
        tendon_slack_length=0.2226472 pennation_angle_at_optimal=0.06309973
      PathPoint vasint_l-P1: femur_l (0.0317866 -0.210888 -0.0339788)
      PathPoint vasint_l-P2: femur_l (0.036719 -0.228425 -0.0312385)
      PathPoint vasint_l-P3: patella_l (0.00635732 0.0526123 0.000657653)
      PathPoint vasint_l-P4: patella_l (0.00548045 0.00270734 0.000427475)
      PathPoint vasint_l-P5: tibia_l (0.0367169 -0.0712468 -0.000484749)
      PathWrap: wrap_object=KnExt_at_fem_l method=hybrid
    Millard2012EquilibriumMuscle vas_lat_l: max_isometric_force=2365.898 optimal_fiber_length=0.1094203
        tendon_slack_length=0.2428397 pennation_angle_at_optimal=0.2528673
      PathPoint vaslat_l-P1: femur_l (0.00526123 -0.203215 -0.0382535)
      PathPoint vaslat_l-P2: femur_l (0.0294848 -0.283997 -0.04483)
      PathPoint vaslat_l-P3: patella_l (0.0112897 0.0463646 -0.0154549)
      PathPoint vaslat_l-P4: patella_l (0.00548045 0.00270734 -0.00803433)
      PathPoint vaslat_l-P5: tibia_l (0.0366831 -0.0714497 -0.00576062)
      PathWrap: wrap_object=KnExt_at_fem_l method=hybrid
    Millard2012EquilibriumMuscle vas_med_l: max_isometric_force=1262.646 optimal_fiber_length=0.1066042
        tendon_slack_length=0.2201511 pennation_angle_at_optimal=0.4222225
      PathPoint vasmed_l-P1: femur_l (0.0153452 -0.230069 -0.0206065)
      PathPoint vasmed_l-P2: femur_l (0.0390208 -0.303507 -0.00098648)
      PathPoint vasmed_l-P3: patella_l (0.00690536 0.048776 0.0186335)
      PathPoint vasmed_l-P4: patella_l (0.00548045 0.00270734 0.00931676)
      PathPoint vasmed_l-P5: tibia_l (0.0359616 -0.0716639 0.00764325)
      PathWrap: wrap_object=KnExt_at_fem_l method=hybrid
    CoordinateActuator lumbar_ext: coordinate=lumbar_extension optimal_force=10
    CoordinateActuator lumbar_bend: coordinate=lumbar_bending optimal_force=10
    CoordinateActuator lumbar_rot: coordinate=lumbar_rotation optimal_force=10
    CoordinateActuator shoulder_flex_r: coordinate=arm_flex_r optimal_force=10
    CoordinateActuator shoulder_add_r: coordinate=arm_add_r optimal_force=10
    CoordinateActuator shoulder_rot_r: coordinate=arm_rot_r optimal_force=10
    CoordinateActuator elbow_flex_r: coordinate=elbow_flex_r optimal_force=10
    CoordinateActuator pro_sup_r: coordinate=pro_sup_r optimal_force=10
    CoordinateActuator wrist_flex_r: coordinate=wrist_flex_r optimal_force=10
    CoordinateActuator wrist_dev_r: coordinate=wrist_dev_r optimal_force=10
    CoordinateActuator shoulder_flex_l: coordinate=arm_flex_l optimal_force=10
    CoordinateActuator shoulder_add_l: coordinate=arm_add_l optimal_force=10
    CoordinateActuator shoulder_rot_l: coordinate=arm_rot_l optimal_force=10
    CoordinateActuator elbow_flex_l: coordinate=elbow_flex_l optimal_force=10
    CoordinateActuator pro_sup_l: coordinate=pro_sup_l optimal_force=10
    CoordinateActuator wrist_flex_l: coordinate=wrist_flex_l optimal_force=10
    CoordinateActuator wrist_dev_l: coordinate=wrist_dev_l optimal_force=10
    ObjectGroup right_leg: members=(grac_r iliacus_r psoas_r semimem_r semiten_r soleus_r tfl_r)
    ObjectGroup left_leg: members=(grac_l iliacus_l psoas_l semimem_l semiten_l soleus_l tfl_l)
    ObjectGroup hip_add_r: members=(grac_r semimem_r semiten_r)
    ObjectGroup hip_abd_r: members=tfl_r
    ObjectGroup hip_flex_r: members=(grac_r iliacus_r psoas_r tfl_r)
    ObjectGroup hip_ext_r: members=(semimem_r semiten_r)
    ObjectGroup hip_inrot_r: members=(iliacus_r psoas_r tfl_r)
    ObjectGroup hip_exrot_r
    ObjectGroup knee_flex_r: members=(grac_r semimem_r semiten_r)
    ObjectGroup knee_ext_r
    ObjectGroup ankle_df_r
    ObjectGroup ankle_pf_r: members=soleus_r
    ObjectGroup everter_r
    ObjectGroup inverter_r
    ObjectGroup hip_add_l: members=(grac_l semimem_l semiten_l)
    ObjectGroup hip_abd_l: members=tfl_l
    ObjectGroup hip_flex_l: members=(grac_l iliacus_l psoas_l tfl_l)
    ObjectGroup hip_ext_l: members=(semimem_l semiten_l)
    ObjectGroup hip_exrot_l
    ObjectGroup hip_inrot_l: members=(iliacus_l psoas_l tfl_l)
    ObjectGroup knee_flex_l: members=(grac_l semimem_l semiten_l)
    ObjectGroup knee_ext_l
    ObjectGroup ankle_df_l
    ObjectGroup ankle_pf_l: members=soleus_l
    ObjectGroup everter_l
    ObjectGroup inverter_l
  MarkerSet:
    Marker R.Shoulder: torso (0 0.44726 0.151118) fixed=true
    Marker L.Shoulder: torso (0 0.44726 -0.151118) fixed=true
    Marker R.Clavicle: torso (0.0489537 0.41195 0.0266053) fixed=true
    Marker L.Clavicle: torso (0.0489537 0.41195 -0.0266053) fixed=true
    Marker R.Biceps: humerus_r (-0.00851319 -0.12426 0.0559686) fixed=true
    Marker R.Elbow: humerus_r (0.0112033 -0.314813 0.0392116) fixed=true
    Marker R.Forearm: ulna_r (0.0265825 -0.104987 0.0423265) fixed=true
    Marker R.Wrist: radius_r (-0.0293932 -0.235146 0.00587865) fixed=true
    Marker L.Biceps: humerus_l (0.0283406 -0.133356 -0.0255046) fixed=true
    Marker L.Elbow: humerus_l (0.0112033 -0.314813 -0.0392116) fixed=true
    Marker L.Forearm: ulna_l (0.0185422 -0.104474 -0.036956) fixed=true
    Marker L.Wrist: radius_l (-0.0293932 -0.235146 -0.00587865) fixed=true
    Marker R.ASIS: pelvis (0.01374 -0.0302838 0.15599) fixed=true
    Marker L.ASIS: pelvis (0.01374 -0.0138991 -0.126008) fixed=true
    Marker S2: pelvis (-0.173815 -0.00753919 -0.0162678)
    Marker R.PSIS: pelvis (-0.144808 -0.00883405 0.116097)
    Marker L.PSIS: pelvis (-0.127043 -0.00354492 -0.13795)
    Marker R.TH1: femur_r (0.0712324 -0.0798277 0.0785863)
    Marker R.TH2: femur_r (-0.035116 -0.0797446 0.0923568)
    Marker R.TH3: femur_r (-0.0409019 -0.210696 0.0888531)
    Marker R.Knee: femur_r (0 -0.44282 0.0515162) fixed=true
    Marker R.SH1: tibia_r (0.0177406 -0.145387 0.0822654)
    Marker R.SH2: tibia_r (0.0188053 -0.255388 0.0659399)
    Marker R.SH3: tibia_r (-0.0655634 -0.151405 0.0763823)
    Marker R.SH4: tibia_r (-0.0635719 -0.268437 0.0598884)
    Marker R.Ankle: tibia_r (-0.00563661 -0.42703 0.0597481) fixed=true
    Marker R.Toe: calcn_r (0.24856 0.0537626 -0.0127869) fixed=true
    Marker R.MT5: calcn_r (0.168603 0.0161752 0.0639042) fixed=true
    Marker R.Heel: calcn_r (-0.0207826 0.0252505 -0.0121809) fixed=true
    Marker L.TH1: femur_l (0.0648979 -0.0785728 -0.0973158)
    Marker L.TH2: femur_l (0.0731224 -0.209583 -0.0858328)
    Marker L.TH3: femur_l (-0.0407956 -0.0779194 -0.0970914)
    Marker L.TH4: femur_l (-0.0443193 -0.211224 -0.0814461)
    Marker L.Knee: femur_l (0 -0.44282 -0.0515162) fixed=true
    Marker L.SH1: tibia_l (0.0222525 -0.102892 -0.0692847)
    Marker L.SH2: tibia_l (-0.0732796 -0.0967331 -0.0704155)
    Marker L.SH3: tibia_l (-0.0718365 -0.213195 -0.0563435)
    Marker L.Ankle: tibia_l (-0.00563661 -0.42703 -0.0597481) fixed=true
    Marker L.Toe: calcn_l (0.245752 0.0596425 0.0107324) fixed=true
    Marker L.Heel: calcn_l (-0.0207826 0.0252505 0.0121809) fixed=true
    Marker L.MT5: calcn_l (0.159141 0.0144047 -0.0633685) fixed=true
  ProbeSet:
    Umberger2010MuscleMetabolicsProbe metabolic_power: probe_operation=value activation_maintenance_rate_on=true
        shortening_rate_on=true basal_rate_on=false mechanical_work_rate_on=true muscle_effort_scaling_factor=0.5
        report_total_metabolics_only=false
      Umberger2010MuscleMetabolicsProbe_MetabolicMuscleParameterSet:
        Umberger2010MuscleMetabolicsProbe_MetabolicMuscleParameter add_brev_r: ratio_slow_twitch_fibers=0.5
            use_provided_muscle_mass=false
        Umberger2010MuscleMetabolicsProbe_MetabolicMuscleParameter add_long_r: ratio_slow_twitch_fibers=0.5
            use_provided_muscle_mass=false
        Umberger2010MuscleMetabolicsProbe_MetabolicMuscleParameter add_mag3_r: ratio_slow_twitch_fibers=0.552
            use_provided_muscle_mass=false
        Umberger2010MuscleMetabolicsProbe_MetabolicMuscleParameter add_mag4_r: ratio_slow_twitch_fibers=0.552
            use_provided_muscle_mass=false
        Umberger2010MuscleMetabolicsProbe_MetabolicMuscleParameter add_mag2_r: ratio_slow_twitch_fibers=0.552
            use_provided_muscle_mass=false
        Umberger2010MuscleMetabolicsProbe_MetabolicMuscleParameter add_mag1_r: ratio_slow_twitch_fibers=0.552
            use_provided_muscle_mass=false
        Umberger2010MuscleMetabolicsProbe_MetabolicMuscleParameter bifemlh_r: ratio_slow_twitch_fibers=0.5425
            use_provided_muscle_mass=false
        Umberger2010MuscleMetabolicsProbe_MetabolicMuscleParameter bifemsh_r: ratio_slow_twitch_fibers=0.529
            use_provided_muscle_mass=false
        Umberger2010MuscleMetabolicsProbe_MetabolicMuscleParameter ext_dig_r: ratio_slow_twitch_fibers=0.75
            use_provided_muscle_mass=false
        Umberger2010MuscleMetabolicsProbe_MetabolicMuscleParameter ext_hal_r: ratio_slow_twitch_fibers=0.75
            use_provided_muscle_mass=false
        Umberger2010MuscleMetabolicsProbe_MetabolicMuscleParameter flex_dig_r: ratio_slow_twitch_fibers=0.6
            use_provided_muscle_mass=false
        Umberger2010MuscleMetabolicsProbe_MetabolicMuscleParameter flex_hal_r: ratio_slow_twitch_fibers=0.6
            use_provided_muscle_mass=false
        Umberger2010MuscleMetabolicsProbe_MetabolicMuscleParameter lat_gas_r: ratio_slow_twitch_fibers=0.507
            use_provided_muscle_mass=false
        Umberger2010MuscleMetabolicsProbe_MetabolicMuscleParameter med_gas_r: ratio_slow_twitch_fibers=0.566
            use_provided_muscle_mass=false
        Umberger2010MuscleMetabolicsProbe_MetabolicMuscleParameter glut_max1_r: ratio_slow_twitch_fibers=0.55
            use_provided_muscle_mass=false
        Umberger2010MuscleMetabolicsProbe_MetabolicMuscleParameter glut_max2_r: ratio_slow_twitch_fibers=0.55
            use_provided_muscle_mass=false
        Umberger2010MuscleMetabolicsProbe_MetabolicMuscleParameter glut_max3_r: ratio_slow_twitch_fibers=0.55
            use_provided_muscle_mass=false
        Umberger2010MuscleMetabolicsProbe_MetabolicMuscleParameter glut_med1_r: ratio_slow_twitch_fibers=0.55
            use_provided_muscle_mass=false
        Umberger2010MuscleMetabolicsProbe_MetabolicMuscleParameter glut_med2_r: ratio_slow_twitch_fibers=0.55
            use_provided_muscle_mass=false
        Umberger2010MuscleMetabolicsProbe_MetabolicMuscleParameter glut_med3_r: ratio_slow_twitch_fibers=0.55
            use_provided_muscle_mass=false
        Umberger2010MuscleMetabolicsProbe_MetabolicMuscleParameter glut_min1_r: ratio_slow_twitch_fibers=0.55
            use_provided_muscle_mass=false
        Umberger2010MuscleMetabolicsProbe_MetabolicMuscleParameter glut_min2_r: ratio_slow_twitch_fibers=0.55
            use_provided_muscle_mass=false
        Umberger2010MuscleMetabolicsProbe_MetabolicMuscleParameter glut_min3_r: ratio_slow_twitch_fibers=0.55
            use_provided_muscle_mass=false
        Umberger2010MuscleMetabolicsProbe_MetabolicMuscleParameter grac_r: ratio_slow_twitch_fibers=0.5
            use_provided_muscle_mass=false
        Umberger2010MuscleMetabolicsProbe_MetabolicMuscleParameter iliacus_r: ratio_slow_twitch_fibers=0.5
            use_provided_muscle_mass=false
        Umberger2010MuscleMetabolicsProbe_MetabolicMuscleParameter per_brev_r: ratio_slow_twitch_fibers=0.6
            use_provided_muscle_mass=false
        Umberger2010MuscleMetabolicsProbe_MetabolicMuscleParameter per_long_r: ratio_slow_twitch_fibers=0.6
            use_provided_muscle_mass=false
        Umberger2010MuscleMetabolicsProbe_MetabolicMuscleParameter peri_r: ratio_slow_twitch_fibers=0.5
            use_provided_muscle_mass=false
        Umberger2010MuscleMetabolicsProbe_MetabolicMuscleParameter psoas_r: ratio_slow_twitch_fibers=0.5
            use_provided_muscle_mass=false
        Umberger2010MuscleMetabolicsProbe_MetabolicMuscleParameter rect_fem_r: ratio_slow_twitch_fibers=0.3865
            use_provided_muscle_mass=false
        Umberger2010MuscleMetabolicsProbe_MetabolicMuscleParameter sar_r: ratio_slow_twitch_fibers=0.5
            use_provided_muscle_mass=false
        Umberger2010MuscleMetabolicsProbe_MetabolicMuscleParameter semimem_r: ratio_slow_twitch_fibers=0.4925
            use_provided_muscle_mass=false
        Umberger2010MuscleMetabolicsProbe_MetabolicMuscleParameter semiten_r: ratio_slow_twitch_fibers=0.425
            use_provided_muscle_mass=false
        Umberger2010MuscleMetabolicsProbe_MetabolicMuscleParameter soleus_r: ratio_slow_twitch_fibers=0.803
            use_provided_muscle_mass=false
        Umberger2010MuscleMetabolicsProbe_MetabolicMuscleParameter tfl_r: ratio_slow_twitch_fibers=0.5
            use_provided_muscle_mass=false
        Umberger2010MuscleMetabolicsProbe_MetabolicMuscleParameter tib_ant_r: ratio_slow_twitch_fibers=0.7
            use_provided_muscle_mass=false
        Umberger2010MuscleMetabolicsProbe_MetabolicMuscleParameter tib_post_r: ratio_slow_twitch_fibers=0.6
            use_provided_muscle_mass=false
        Umberger2010MuscleMetabolicsProbe_MetabolicMuscleParameter vas_int_r: ratio_slow_twitch_fibers=0.543
            use_provided_muscle_mass=false
        Umberger2010MuscleMetabolicsProbe_MetabolicMuscleParameter vas_lat_r: ratio_slow_twitch_fibers=0.455
            use_provided_muscle_mass=false
        Umberger2010MuscleMetabolicsProbe_MetabolicMuscleParameter vas_med_r: ratio_slow_twitch_fibers=0.503
            use_provided_muscle_mass=false
        Umberger2010MuscleMetabolicsProbe_MetabolicMuscleParameter add_brev_l: ratio_slow_twitch_fibers=0.5
            use_provided_muscle_mass=false
        Umberger2010MuscleMetabolicsProbe_MetabolicMuscleParameter add_long_l: ratio_slow_twitch_fibers=0.5
            use_provided_muscle_mass=false
        Umberger2010MuscleMetabolicsProbe_MetabolicMuscleParameter add_mag3_l: ratio_slow_twitch_fibers=0.552
            use_provided_muscle_mass=false
        Umberger2010MuscleMetabolicsProbe_MetabolicMuscleParameter add_mag4_l: ratio_slow_twitch_fibers=0.552
            use_provided_muscle_mass=false
        Umberger2010MuscleMetabolicsProbe_MetabolicMuscleParameter add_mag2_l: ratio_slow_twitch_fibers=0.552
            use_provided_muscle_mass=false
        Umberger2010MuscleMetabolicsProbe_MetabolicMuscleParameter add_mag1_l: ratio_slow_twitch_fibers=0.552
            use_provided_muscle_mass=false
        Umberger2010MuscleMetabolicsProbe_MetabolicMuscleParameter bifemlh_l: ratio_slow_twitch_fibers=0.5425
            use_provided_muscle_mass=false
        Umberger2010MuscleMetabolicsProbe_MetabolicMuscleParameter bifemsh_l: ratio_slow_twitch_fibers=0.529
            use_provided_muscle_mass=false
        Umberger2010MuscleMetabolicsProbe_MetabolicMuscleParameter ext_dig_l: ratio_slow_twitch_fibers=0.75
            use_provided_muscle_mass=false
        Umberger2010MuscleMetabolicsProbe_MetabolicMuscleParameter ext_hal_l: ratio_slow_twitch_fibers=0.75
            use_provided_muscle_mass=false
        Umberger2010MuscleMetabolicsProbe_MetabolicMuscleParameter flex_dig_l: ratio_slow_twitch_fibers=0.6
            use_provided_muscle_mass=false
        Umberger2010MuscleMetabolicsProbe_MetabolicMuscleParameter flex_hal_l: ratio_slow_twitch_fibers=0.6
            use_provided_muscle_mass=false
        Umberger2010MuscleMetabolicsProbe_MetabolicMuscleParameter lat_gas_l: ratio_slow_twitch_fibers=0.507
            use_provided_muscle_mass=false
        Umberger2010MuscleMetabolicsProbe_MetabolicMuscleParameter med_gas_l: ratio_slow_twitch_fibers=0.566
            use_provided_muscle_mass=false
        Umberger2010MuscleMetabolicsProbe_MetabolicMuscleParameter glut_max1_l: ratio_slow_twitch_fibers=0.55
            use_provided_muscle_mass=false
        Umberger2010MuscleMetabolicsProbe_MetabolicMuscleParameter glut_max2_l: ratio_slow_twitch_fibers=0.55
            use_provided_muscle_mass=false
        Umberger2010MuscleMetabolicsProbe_MetabolicMuscleParameter glut_max3_l: ratio_slow_twitch_fibers=0.55
            use_provided_muscle_mass=false
        Umberger2010MuscleMetabolicsProbe_MetabolicMuscleParameter glut_med1_l: ratio_slow_twitch_fibers=0.55
            use_provided_muscle_mass=false
        Umberger2010MuscleMetabolicsProbe_MetabolicMuscleParameter glut_med2_l: ratio_slow_twitch_fibers=0.55
            use_provided_muscle_mass=false
        Umberger2010MuscleMetabolicsProbe_MetabolicMuscleParameter glut_med3_l: ratio_slow_twitch_fibers=0.55
            use_provided_muscle_mass=false
        Umberger2010MuscleMetabolicsProbe_MetabolicMuscleParameter glut_min1_l: ratio_slow_twitch_fibers=0.55
            use_provided_muscle_mass=false
        Umberger2010MuscleMetabolicsProbe_MetabolicMuscleParameter glut_min2_l: ratio_slow_twitch_fibers=0.55
            use_provided_muscle_mass=false
        Umberger2010MuscleMetabolicsProbe_MetabolicMuscleParameter glut_min3_l: ratio_slow_twitch_fibers=0.55
            use_provided_muscle_mass=false
        Umberger2010MuscleMetabolicsProbe_MetabolicMuscleParameter grac_l: ratio_slow_twitch_fibers=0.5
            use_provided_muscle_mass=false
        Umberger2010MuscleMetabolicsProbe_MetabolicMuscleParameter iliacus_l: ratio_slow_twitch_fibers=0.5
            use_provided_muscle_mass=false
        Umberger2010MuscleMetabolicsProbe_MetabolicMuscleParameter per_brev_l: ratio_slow_twitch_fibers=0.6
            use_provided_muscle_mass=false
        Umberger2010MuscleMetabolicsProbe_MetabolicMuscleParameter per_long_l: ratio_slow_twitch_fibers=0.6
            use_provided_muscle_mass=false
        Umberger2010MuscleMetabolicsProbe_MetabolicMuscleParameter peri_l: ratio_slow_twitch_fibers=0.5
            use_provided_muscle_mass=false
        Umberger2010MuscleMetabolicsProbe_MetabolicMuscleParameter psoas_l: ratio_slow_twitch_fibers=0.5
            use_provided_muscle_mass=false
        Umberger2010MuscleMetabolicsProbe_MetabolicMuscleParameter rect_fem_l: ratio_slow_twitch_fibers=0.3865
            use_provided_muscle_mass=false
        Umberger2010MuscleMetabolicsProbe_MetabolicMuscleParameter sar_l: ratio_slow_twitch_fibers=0.5
            use_provided_muscle_mass=false
        Umberger2010MuscleMetabolicsProbe_MetabolicMuscleParameter semimem_l: ratio_slow_twitch_fibers=0.4925
            use_provided_muscle_mass=false
        Umberger2010MuscleMetabolicsProbe_MetabolicMuscleParameter semiten_l: ratio_slow_twitch_fibers=0.425
            use_provided_muscle_mass=false
        Umberger2010MuscleMetabolicsProbe_MetabolicMuscleParameter soleus_l: ratio_slow_twitch_fibers=0.803
            use_provided_muscle_mass=false
        Umberger2010MuscleMetabolicsProbe_MetabolicMuscleParameter tfl_l: ratio_slow_twitch_fibers=0.5
            use_provided_muscle_mass=false
        Umberger2010MuscleMetabolicsProbe_MetabolicMuscleParameter tib_ant_l: ratio_slow_twitch_fibers=0.7
            use_provided_muscle_mass=false
        Umberger2010MuscleMetabolicsProbe_MetabolicMuscleParameter tib_post_l: ratio_slow_twitch_fibers=0.6
            use_provided_muscle_mass=false
        Umberger2010MuscleMetabolicsProbe_MetabolicMuscleParameter vas_int_l: ratio_slow_twitch_fibers=0.543
            use_provided_muscle_mass=false
        Umberger2010MuscleMetabolicsProbe_MetabolicMuscleParameter vas_lat_l: ratio_slow_twitch_fibers=0.455
            use_provided_muscle_mass=false
        Umberger2010MuscleMetabolicsProbe_MetabolicMuscleParameter vas_med_l: ratio_slow_twitch_fibers=0.503
            use_provided_muscle_mass=false
